<!DOCTYPE autopilot SYSTEM "autopilot.dtd">

<autopilot name="Forwardswept Autopilot">

  <state_machine name="ap" freq="PERIODIC_FREQUENCY" gcs_mode="true" settings_mode="true" settings_handler="autopilot_generated|SetModeHandler">

    <modules>
      <module name="control_mixing" type="forwardswept"/>
      <module name="stabilization"  type="int_quat"/>
      <module name="stabilization"  type="rate"/>
      <module name="guidance"       type="plane_pid_rotorcraft"/>
      <module name="nav"            type="hybrid"/> <!-- not sure what nav we want -->
    </modules>

    <includes>
      <include name="autopilot_rc_helpers.h"/>
      <!--define name="MODE_MANUAL" value="AP_MODE_ATTITUDE_DIRECT" cond="ifndef MODE_MANUAL"/>
      <define name="MODE_AUTO1" value="AP_MODE_ATTITUDE_Z_HOLD" cond="ifndef MODE_AUTO1"/-->
      <define name="MODE_AUTO2" value="AP_MODE_NAV" cond="ifndef MODE_AUTO2"/>
      <define name="RCLost()" value="(radio_control.status == RC_REALLY_LOST)"/>
      <define name="DLModeAtt()" value="(autopilot_mode_auto2 == 0)"/>
      <define name="DLModeNav()" value="(autopilot_mode_auto2 == 1)"/>
    </includes>

    <settings>
      <dl_setting var="autopilot.kill_throttle" min="0" step="1" max="1" module="autopilot" values="Resurrect|Kill" handler="KillThrottle"/>
      <dl_setting var="autopilot_mode_auto2" min="0" step="1" max="1" module="autopilot" values="ATT|NAV"/>
    </settings>

    <control_block name="set_commands">
      <call fun="SetRotorcraftCommands(stabilization.cmd, autopilot_in_flight(), autopilot_get_motors_on())"/>
    </control_block>

    <mode_selection>
      <mode_select cond="RCMode0()" mode="MODE_MANUAL"/>
      <mode_select cond="RCMode1()" mode="MODE_AUTO1"/>
      <mode_select cond="RCMode2()" mode="MODE_AUTO2"/>
    </mode_selection>

    <exceptions>
      <exception cond="nav.too_far_from_home" deroute="HOME"/>
      <exception cond="kill_switch_is_on()" deroute="KILL"/>
    </exceptions>

    <!-- Kill throttle mode -->
    <mode name="KILL">
      <select cond="kill_switch_is_on()"/>
      <on_enter>
        <call fun="guidance_h_mode_changed(GUIDANCE_H_MODE_NONE)"/>
        <call fun="stabilization_mode_changed(STABILIZATION_MODE_NONE, 0)"/>
        <call fun="guidance_v_mode_changed(GUIDANCE_V_MODE_KILL)"/>
        <call fun="autopilot_set_in_flight(false)"/>
        <call fun="autopilot_set_motors_on(false)"/>
        <!--call fun="stabilization.cmd[COMMAND_THRUST] = 0"/-->
      </on_enter>
      <control>
        <call fun="SetCommands(commands_failsafe)"/>
      </control>
    </mode>

    <!-- Glide (same as KILL ?) -->
    <mode name="FAILSAFE" shortname="FAIL">
      <on_enter>
        <call fun="guidance_h_mode_changed(GUIDANCE_H_MODE_NONE)"/>
        <call fun="guidance_v_mode_changed(GUIDANCE_V_MODE_KILL)"/>
        <call fun="stabilization_mode_changed(STABILIZATION_MODE_ATTITUDE, STABILIZATION_ATT_SUBMODE_HEADING)"/>
        <call fun="autopilot_set_motors_on(false)"/>
      </on_enter>
      <control>
        <call fun="stabilization_get_failsafe_sp()" store="struct StabilizationSetpoint stab_failsafe"/>
        <call fun="th_sp_from_thrust_i(0, THRUST_AXIS_Z)" store="struct ThrustSetpoint thrust_sp"/>
        <call fun="stabilization_run(autopilot_in_flight(), &stab_failsafe, &thrust_sp, stabilization.cmd)"/>
        <call_block name="set_commands"/>
      </control>
      <exception cond="!GpsIsLost()" deroute="$LAST_MODE"/>
    </mode>

    <mode name="ATTITUDE" shortname="ATT">
      <on_enter>
        <call fun="control_mixing_forwardswept_attitude_direct_enter()"/>
      </on_enter>
      <control freq="NAVIGATION_FREQUENCY">
        <call fun="nav_periodic_task()"/>
      </control>
      <control>
        <call fun="control_mixing_forwardswept_attitude_direct_run()"/>
      </control>
      <exception cond="RCLost()" deroute="FAILSAFE"/>
    </mode>

    <mode name="RATE" shortname="RATE">
      <on_enter>
        <call fun="control_mixing_forwardswept_rate_enter()"/>
      </on_enter>
      <control freq="NAVIGATION_FREQUENCY">
        <call fun="nav_periodic_task()"/>
      </control>
      <control>
        <call fun="control_mixing_forwardswept_rate_run()"/>
      </control>
      <exception cond="RCLost()" deroute="FAILSAFE"/>
    </mode>

    <mode name="NAV">
      <select cond="$DEFAULT_MODE"/>
      <on_enter>
        <call fun="control_mixing_forwardswept_nav_enter()"/>
      </on_enter>
      <control freq="NAVIGATION_FREQUENCY">
        <call fun="nav_periodic_task()"/>
      </control>
      <control>
        <call fun="control_mixing_forwardswept_nav_run()"/>
      </control>
      <exception cond="GpsIsLost() && autopilot_in_flight()" deroute="FAILSAFE"/>
    </mode>

    <mode name="HOME">
      <on_enter>
        <call fun="control_mixing_forwardswept_nav_enter()"/>
      </on_enter>
      <control freq="NAVIGATION_FREQUENCY">
        <call fun="nav_home()"/>
      </control>
      <control>
        <call fun="control_mixing_forwardswept_nav_run()"/>
      </control>
      <exception cond="GpsIsLost()" deroute="FAILSAFE"/>
    </mode>

  </state_machine>

</autopilot>
