<?xml version="1.0"?>
<?xml-stylesheet href="http://jsbsim.sourceforge.net/JSBSim.xsl" type="text/xsl"?>
<fdm_config name="openuas_jsbsim_generic_fixedwing" version="2.0" release="BETA"
 xmlns:xsi="http://www.w3.org/2001/XMLSchema-instance"
 xsi:noNamespaceSchemaLocation="http://jsbsim.sourceforge.net/JSBSim.xsd">

    <fileheader>
        <author> Paparazzi UAV / OpenUAS </author>
        <filecreationdate> 2026-07-09 </filecreationdate>
        <version> 1.0 </version>
        <description>
            Multiplex Minimag foam RC trainer used as a generic fixed-wing UAV.
            Conventional high-wing tractor layout with dihedral; controls:
            throttle, ailerons, elevator, rudder (4 channel).
            Wingspan 1.010 m, wing area 22.3 dm2 (AR = 4.57), fuselage length
            820 mm, all-up weight 730 g (wing loading ~33 g/dm2), no landing
            gear (removed; hand launch, belly lander).
            Motor Surpass Hobby 2830-1300KV + 7x4 3-blade tractor prop,
            3S Li-Ion (12.6 V max, 9.0 V min).
            CG at 67 mm aft of the wing leading edge (~30% MAC).
            Airspeed envelope: 1-g stall ~7 m/s (practical stall 8 m/s),
            nominal 13 m/s, max level 16 m/s, zero-thrust/dive limit ~21 m/s.
        </description>
        <reference title="Multiplex Minimag specifications"/>
    </fileheader>

    <!-- **********************************************************************
        METRICS  (structural frame: origin at nose tip, x aft, z up)
        Wing LE at x = 240 mm (9.45 in); MAC = S/b = 0.221 m.
        AERORP placed essentially at the CG (12.1 in): all static stability
        is carried explicitly by Cmalpha, same proven pattern as the
        openuas_jsbsim_zohd_talon_250g model.
        ********************************************************************** -->
    <metrics>
        <wingarea unit="FT2">  2.4003 </wingarea>   <!-- 22.3 dm2 = 0.223 m2 -->
        <wingspan unit="FT">   3.3136 </wingspan>   <!-- 1.010 m -->
        <chord unit="FT">      0.7243 </chord>      <!-- S/b = 0.2208 m -->
        <htailarea unit="FT2"> 0.3767 </htailarea>  <!-- ~3.5 dm2 -->
        <htailarm unit="FT">   1.4764 </htailarm>   <!-- ~0.45 m -->
        <vtailarea unit="FT2"> 0.2153 </vtailarea>  <!-- ~2.0 dm2 -->
        <vtailarm unit="FT">   1.4764 </vtailarm>   <!-- ~0.45 m -->
        <location name="AERORP" unit="IN">
            <x> 12.2 </x>
            <y> 0.0 </y>
            <z> 0.0 </z>
        </location>
        <location name="EYEPOINT" unit="IN">
            <x> 0.0 </x>
            <y> 0.0 </y>
            <z> 0.0 </z>
        </location>
        <location name="VRP" unit="IN">
            <x> 0.0 </x>
            <y> 0.0 </y>
            <z> 0.0 </z>
        </location>
    </metrics>

    <!-- **********************************************************************
        MASS BALANCE  (AUW 730 g = 1.6094 lbs)
        CG: 67 mm aft of the wing LE (wing LE at 240 mm from the nose)
        -> x = 307 mm = 12.1 in.
        Inertias estimated for a 730 g / 1.01 m span foam high-wing trainer
        (motor+prop at the nose, 3S Li-Ion pack just aft of it, foam wing):
        Ixx = 0.018, Iyy = 0.020, Izz = 0.035 kg*m2
        ********************************************************************** -->
    <mass_balance>
        <ixx unit="SLUG*FT2"> 0.01328 </ixx>
        <iyy unit="SLUG*FT2"> 0.01475 </iyy>
        <izz unit="SLUG*FT2"> 0.02581 </izz>
        <ixy unit="SLUG*FT2"> 0.0 </ixy>
        <ixz unit="SLUG*FT2"> 0.0 </ixz>
        <iyz unit="SLUG*FT2"> 0.0 </iyz>
        <emptywt unit="LBS"> 1.6094 </emptywt>
        <location name="CG" unit="IN">
            <x> 12.1 </x>
            <y> 0.0 </y>
            <z> 0.0 </z>
        </location>
    </mass_balance>

    <!-- **********************************************************************
        GROUND REACTIONS - landing gear removed, belly lander:
        structural contact points only (nose, belly, tail, wingtips, fin)
        ********************************************************************** -->
    <ground_reactions>
        <contact type="STRUCTURE" name="NOSE">
            <location unit="IN">
                <x> 0.0 </x>
                <y> 0.0 </y>
                <z> -0.8 </z>
            </location>
            <static_friction> 0.8 </static_friction>
            <dynamic_friction> 0.5 </dynamic_friction>
            <spring_coeff unit="LBS/FT"> 16 </spring_coeff>
            <damping_coeff unit="LBS/FT/SEC"> 1.0 </damping_coeff>
        </contact>
        <contact type="STRUCTURE" name="BELLY_FRONT">
            <location unit="IN">
                <x> 6.0 </x>
                <y> 0.0 </y>
                <z> -2.0 </z>
            </location>
            <static_friction> 0.8 </static_friction>
            <dynamic_friction> 0.5 </dynamic_friction>
            <spring_coeff unit="LBS/FT"> 16 </spring_coeff>
            <damping_coeff unit="LBS/FT/SEC"> 1.0 </damping_coeff>
        </contact>
        <contact type="STRUCTURE" name="BELLY_REAR">
            <location unit="IN">
                <x> 16.0 </x>
                <y> 0.0 </y>
                <z> -1.8 </z>
            </location>
            <static_friction> 0.8 </static_friction>
            <dynamic_friction> 0.5 </dynamic_friction>
            <spring_coeff unit="LBS/FT"> 16 </spring_coeff>
            <damping_coeff unit="LBS/FT/SEC"> 1.0 </damping_coeff>
        </contact>
        <contact type="STRUCTURE" name="TAIL_SKID">
            <location unit="IN">
                <x> 32.0 </x>
                <y> 0.0 </y>
                <z> -0.6 </z>
            </location>
            <static_friction> 0.8 </static_friction>
            <dynamic_friction> 0.5 </dynamic_friction>
            <spring_coeff unit="LBS/FT"> 16 </spring_coeff>
            <damping_coeff unit="LBS/FT/SEC"> 1.0 </damping_coeff>
        </contact>
        <contact type="STRUCTURE" name="LEFT_WINGTIP">
            <!-- high wing with dihedral: tips sit above the fuselage line -->
            <location unit="IN">
                <x> 12.5 </x>
                <y> -19.9 </y>
                <z> 2.6 </z>
            </location>
            <static_friction> 0.8 </static_friction>
            <dynamic_friction> 0.5 </dynamic_friction>
            <spring_coeff unit="LBS/FT"> 16 </spring_coeff>
            <damping_coeff unit="LBS/FT/SEC"> 1.0 </damping_coeff>
        </contact>
        <contact type="STRUCTURE" name="RIGHT_WINGTIP">
            <location unit="IN">
                <x> 12.5 </x>
                <y> 19.9 </y>
                <z> 2.6 </z>
            </location>
            <static_friction> 0.8 </static_friction>
            <dynamic_friction> 0.5 </dynamic_friction>
            <spring_coeff unit="LBS/FT"> 16 </spring_coeff>
            <damping_coeff unit="LBS/FT/SEC"> 1.0 </damping_coeff>
        </contact>
        <contact type="STRUCTURE" name="FIN_TOP">
            <location unit="IN">
                <x> 31.0 </x>
                <y> 0.0 </y>
                <z> 4.5 </z>
            </location>
            <static_friction> 0.8 </static_friction>
            <dynamic_friction> 0.5 </dynamic_friction>
            <spring_coeff unit="LBS/FT"> 16 </spring_coeff>
            <damping_coeff unit="LBS/FT/SEC"> 1.0 </damping_coeff>
        </contact>
    </ground_reactions>

    <!-- **********************************************************************
        PROPULSION - TRACTOR: Surpass Hobby 2830-1300KV + 7x4 3-blade prop
        at the nose, 3S Li-Ion (12.6 V max / 9.0 V min).
        The engine below is a zero-power dummy: it only exists so that
        Paparazzi NPS can drive fcs/throttle-cmd-norm (SetThrottleCmd needs
        at least one engine). Real thrust is applied via <external_reactions>
        (see below), because JSBSim's propeller reaction torque is singular
        (power/omega, omega clamped at 0.01) at throttle-up and instantly
        tumbles a sub-kilogram airframe. Same proven approach as the
        openuas_jsbsim_zohd_talon_250g and cyclone models.
        ********************************************************************** -->
    <propulsion>
        <engine file="MinimagMotor">
            <location unit="IN">
                <x> 0.5 </x>
                <y> 0.0 </y>
                <z> 0.0 </z>
            </location>
            <orient unit="DEG">
                <roll> 0.0 </roll>
                <pitch> 0.0 </pitch>
                <yaw> 0.0 </yaw>
            </orient>
            <feed>0</feed>
            <thruster file="prop7x4x3">
                <location unit="IN">
                    <x> 0.5 </x>
                    <y> 0.0 </y>
                    <z> 0.0 </z>
                </location>
                <orient unit="DEG">
                    <roll> 0.0 </roll>
                    <pitch> 0.0 </pitch>
                    <yaw> 0.0 </yaw>
                </orient>
                <sense> 1 </sense> <!-- tractor -->
                <p_factor>0.0</p_factor>
            </thruster>
        </engine>
        <!-- dummy tank: electric propulsion, avoids "no tank" warning -->
        <tank type="FUEL">
            <location unit="IN">
                <x> 12.1 </x>
                <y> 0.0 </y>
                <z> 0.0 </z>
            </location>
            <capacity unit="LBS"> 0.0001 </capacity>
            <contents unit="LBS"> 0.0 </contents>
        </tank>
    </propulsion>

    <!-- **********************************************************************
        FLIGHT CONTROL SYSTEM
        Surface throws (typical Minimag setup):
        elevator +/-20 deg (0.35 rad), ailerons +/-20 deg (0.35 rad),
        rudder +/-30 deg (0.52 rad).
        ********************************************************************** -->
    <flight_control name="FCS: openuas_jsbsim_generic_fixedwing">

        <channel name="Pitch">
            <summer name="Pitch Trim Sum">
                <input>fcs/elevator-cmd-norm</input>
                <input>fcs/pitch-trim-cmd-norm</input>
                <clipto>
                    <min>-1</min>
                    <max>1</max>
                </clipto>
            </summer>
            <aerosurface_scale name="Elevator Control">
                <input>fcs/pitch-trim-sum</input>
                <range>
                    <min>-0.35</min>
                    <max>0.35</max>
                </range>
                <output>fcs/elevator-pos-rad</output>
            </aerosurface_scale>
            <aerosurface_scale name="Elevator Normalized">
                <input>fcs/elevator-pos-rad</input>
                <domain>
                    <min>-0.35</min>
                    <max> 0.35</max>
                </domain>
                <range>
                    <min>-1</min>
                    <max> 1</max>
                </range>
                <output>fcs/elevator-pos-norm</output>
            </aerosurface_scale>
        </channel>

        <channel name="Roll">
            <summer name="Roll Trim Sum">
                <input>fcs/aileron-cmd-norm</input>
                <input>fcs/roll-trim-cmd-norm</input>
                <clipto>
                    <min>-1</min>
                    <max>1</max>
                </clipto>
            </summer>
            <aerosurface_scale name="Left Aileron Control">
                <input>fcs/roll-trim-sum</input>
                <range>
                    <min>-0.35</min>
                    <max>0.35</max>
                </range>
                <output>fcs/left-aileron-pos-rad</output>
            </aerosurface_scale>
            <aerosurface_scale name="Right Aileron Control">
                <input>-fcs/roll-trim-sum</input>
                <range>
                    <min>-0.35</min>
                    <max>0.35</max>
                </range>
                <output>fcs/right-aileron-pos-rad</output>
            </aerosurface_scale>
            <aerosurface_scale name="Left Aileron Normalized">
                <input>fcs/left-aileron-pos-rad</input>
                <domain>
                    <min>-0.35</min>
                    <max> 0.35</max>
                </domain>
                <range>
                    <min>-1</min>
                    <max> 1</max>
                </range>
                <output>fcs/left-aileron-pos-norm</output>
            </aerosurface_scale>
            <aerosurface_scale name="Right Aileron Normalized">
                <input>fcs/right-aileron-pos-rad</input>
                <domain>
                    <min>-0.35</min>
                    <max> 0.35</max>
                </domain>
                <range>
                    <min>-1</min>
                    <max> 1</max>
                </range>
                <output>fcs/right-aileron-pos-norm</output>
            </aerosurface_scale>
        </channel>

        <!--
            Motor/ESC/prop response lag (~0.1 s time constant), then thrust
            is generated in external_reactions from fcs/throttle-lag.
        -->
        <channel name="Throttle">
            <summer name="Throttle Sum">
                <input>fcs/throttle-cmd-norm</input>
                <clipto>
                    <min>0</min>
                    <max>1</max>
                </clipto>
            </summer>
            <lag_filter name="Throttle Lag">
                <input>fcs/throttle-sum</input>
                <c1>10.0</c1>
                <output>fcs/throttle-lag</output>
            </lag_filter>
        </channel>

        <channel name="Yaw">
            <summer name="Rudder Command Sum">
                <input>fcs/rudder-cmd-norm</input>
                <input>fcs/yaw-trim-cmd-norm</input>
                <clipto>
                    <min>-1</min>
                    <max>1</max>
                </clipto>
            </summer>
            <aerosurface_scale name="Rudder Control">
                <input>fcs/rudder-command-sum</input>
                <range>
                    <min>-0.52</min>
                    <max>0.52</max>
                </range>
                <output>fcs/rudder-pos-rad</output>
            </aerosurface_scale>
            <aerosurface_scale name="Rudder Normalized">
                <input>fcs/rudder-pos-rad</input>
                <domain>
                    <min>-0.52</min>
                    <max> 0.52</max>
                </domain>
                <range>
                    <min>-1</min>
                    <max> 1</max>
                </range>
                <output>fcs/rudder-pos-norm</output>
            </aerosurface_scale>
        </channel>

    </flight_control>

    <!-- **********************************************************************
        THRUST (external reaction, replaces the singular propeller model)
        Tractor: 2830-1300KV + 7x4 3-blade prop on 3S Li-Ion (~11.1 V nominal
        under load, sag to 9.0 V). Static thrust 7.55 N (~770 gf, T/W = 1.05:
        an easy hand-toss launch with motor on). Thrust decays with airspeed
        and crosses airframe drag (1.71 N) at 16 m/s => level Vmax = 16 m/s,
        zero at ~21 m/s effective pitch speed (Li-Ion sag included), mild
        windmill braking beyond.
        Applied on the thrust line at the nose (x = 0.5 in, z = 0).
        Expressed in LBS versus axial airspeed u (fps).
        ********************************************************************** -->
    <external_reactions>
        <property>fcs/throttle-lag</property>

        <force name="prop-thrust" frame="BODY" unit="LBS">
            <function>
                <product>
                    <property>fcs/throttle-lag</property>
                    <table>
                        <independentVar>velocities/u-aero-fps</independentVar>
                        <tableData>
                              0.0    1.6980
                             13.1    1.5000
                             26.2    1.2400
                             39.4    0.9200
                             45.9    0.7300
                             52.5    0.5300
                             59.1    0.3000
                             68.9    0.0000
                             98.4   -0.0300
                        </tableData>
                    </table>
                </product>
            </function>
            <location unit="IN">
                <x> 0.5 </x>
                <y> 0.0 </y>
                <z> 0.0 </z>
            </location>
            <direction>
                <x> 1.0 </x>
                <y> 0.0 </y>
                <z> 0.0 </z>
            </direction>
        </force>
    </external_reactions>

    <!-- **********************************************************************
        AERODYNAMICS
        Sized from: m = 0.73 kg, S = 0.223 m2, b = 1.01 m, AR = 4.57
        CLalpha = 2*pi/(1 + 2/AR) = 4.37 /rad, CL0 = 0.20 (cambered trainer
        airfoil), CLmax = 1.12 at alpha = 12 deg  ->  1-g stall 6.9 m/s
        (practical/dynamic stall ~8 m/s as per spec sheet)
        CD0 = 0.045 (boxy foam trainer + exposed gear-less belly),
        k = 1/(pi*AR*e), e = 0.75  ->  k = 0.0929, best L/D ~ 7.7 at 9.3 m/s
        Drag at 16 m/s = 1.71 N = thrust there  ->  level Vmax = 16 m/s
        Cm0 = 0.045, Cmalpha = -0.65 (CG at 30% MAC, ~15% static margin
        with the generous Minimag tail volume): hands-off trim ~10 m/s,
        so an 8-9 m/s hand toss with power accelerates and climbs away.
        High wing + dihedral: strong Clb, docile spiral behaviour.
        ********************************************************************** -->
    <aerodynamics>

        <axis name="DRAG">
            <function name="aero/coefficient/CD0">
                <description>Drag_at_zero_lift</description>
                <product>
                    <property>aero/qbar-psf</property>
                    <property>metrics/Sw-sqft</property>
                    <table>
                        <independentVar>aero/alpha-rad</independentVar>
                        <tableData>
                            -1.5700   1.3000
                            -0.3000   0.0800
                             0.0000   0.0450
                             0.3000   0.0800
                             1.5700   1.3000
                        </tableData>
                    </table>
                </product>
            </function>
            <function name="aero/coefficient/CDi">
                <description>Induced_drag</description>
                <product>
                    <property>aero/qbar-psf</property>
                    <property>metrics/Sw-sqft</property>
                    <property>aero/cl-squared</property>
                    <value>0.0929</value>
                </product>
            </function>
            <function name="aero/coefficient/CDbeta">
                <description>Drag_due_to_sideslip</description>
                <product>
                    <property>aero/qbar-psf</property>
                    <property>metrics/Sw-sqft</property>
                    <table>
                        <independentVar>aero/beta-rad</independentVar>
                        <tableData>
                            -1.5700   1.0000
                            -0.2600   0.0300
                             0.0000   0.0000
                             0.2600   0.0300
                             1.5700   1.0000
                        </tableData>
                    </table>
                </product>
            </function>
            <function name="aero/coefficient/CDde">
                <description>Drag_due_to_Elevator_Deflection</description>
                <product>
                    <property>aero/qbar-psf</property>
                    <property>metrics/Sw-sqft</property>
                    <abs><property>fcs/elevator-pos-norm</property></abs>
                    <value>0.0250</value>
                </product>
            </function>
        </axis>

        <axis name="SIDE">
            <function name="aero/coefficient/CYb">
                <description>Side_force_due_to_beta</description>
                <product>
                    <property>aero/qbar-psf</property>
                    <property>metrics/Sw-sqft</property>
                    <property>aero/beta-rad</property>
                    <value>-0.3500</value>
                </product>
            </function>
            <function name="aero/coefficient/CYdr">
                <description>Side_force_due_to_rudder</description>
                <product>
                    <property>aero/qbar-psf</property>
                    <property>metrics/Sw-sqft</property>
                    <property>fcs/rudder-pos-rad</property>
                    <value>0.1000</value>
                </product>
            </function>
        </axis>

        <axis name="LIFT">
            <function name="aero/coefficient/CLalpha">
                <description>Lift_due_to_alpha</description>
                <product>
                    <property>aero/qbar-psf</property>
                    <property>metrics/Sw-sqft</property>
                    <table>
                        <independentVar>aero/alpha-rad</independentVar>
                        <tableData>
                            -0.3000  -0.6000
                            -0.1830  -0.6000
                             0.0000   0.2000
                             0.2100   1.1200
                             0.2800   0.9500
                             0.4500   0.7000
                             0.9000   0.4500
                        </tableData>
                    </table>
                </product>
            </function>
            <function name="aero/coefficient/CLde">
                <description>Lift_due_to_Elevator_Deflection</description>
                <product>
                    <property>aero/qbar-psf</property>
                    <property>metrics/Sw-sqft</property>
                    <property>fcs/elevator-pos-rad</property>
                    <value>0.3500</value>
                </product>
            </function>
        </axis>

        <axis name="ROLL">
            <function name="aero/coefficient/Clb">
                <description>Roll_moment_due_to_beta</description>
                <!-- high wing + generous dihedral: strong dihedral effect,
                     spiral mode stable (Clb*Cnr > Clr*Cnb): the real Minimag
                     self-rights hands-off, a true trainer trait -->
                <product>
                    <property>aero/qbar-psf</property>
                    <property>metrics/Sw-sqft</property>
                    <property>metrics/bw-ft</property>
                    <property>aero/beta-rad</property>
                    <value>-0.1000</value>
                </product>
            </function>
            <function name="aero/coefficient/Clp">
                <description>Roll_moment_due_to_roll_rate</description>
                <product>
                    <property>aero/qbar-psf</property>
                    <property>metrics/Sw-sqft</property>
                    <property>metrics/bw-ft</property>
                    <property>aero/bi2vel</property>
                    <property>velocities/p-aero-rad_sec</property>
                    <value>-0.5000</value>
                </product>
            </function>
            <function name="aero/coefficient/Clr">
                <description>Roll_moment_due_to_yaw_rate</description>
                <product>
                    <property>aero/qbar-psf</property>
                    <property>metrics/Sw-sqft</property>
                    <property>metrics/bw-ft</property>
                    <property>aero/bi2vel</property>
                    <property>velocities/r-aero-rad_sec</property>
                    <value>0.0800</value>
                </product>
            </function>
            <function name="aero/coefficient/Clda">
                <description>Roll_moment_due_to_aileron</description>
                <product>
                    <property>aero/qbar-psf</property>
                    <property>metrics/Sw-sqft</property>
                    <property>metrics/bw-ft</property>
                    <property>fcs/left-aileron-pos-rad</property>
                    <value>0.1800</value>
                </product>
            </function>
            <function name="aero/coefficient/Cldr">
                <description>Roll_moment_due_to_rudder</description>
                <product>
                    <property>aero/qbar-psf</property>
                    <property>metrics/Sw-sqft</property>
                    <property>metrics/bw-ft</property>
                    <property>fcs/rudder-pos-rad</property>
                    <value>0.0200</value>
                </product>
            </function>
        </axis>

        <axis name="PITCH">
            <function name="aero/coefficient/Cm0">
                <description>Pitch_moment_at_zero_alpha</description>
                <!-- set so neutral-elevator trim is alpha ~4 deg = ~10 m/s:
                     a hand-tossed launch (8-9 m/s, motor on) accelerates
                     and climbs away hands-off, like the real airframe -->
                <product>
                    <property>aero/qbar-psf</property>
                    <property>metrics/Sw-sqft</property>
                    <property>metrics/cbarw-ft</property>
                    <value>0.0450</value>
                </product>
            </function>
            <function name="aero/coefficient/Cmalpha">
                <description>Pitch_moment_due_to_alpha</description>
                <product>
                    <property>aero/qbar-psf</property>
                    <property>metrics/Sw-sqft</property>
                    <property>metrics/cbarw-ft</property>
                    <property>aero/alpha-rad</property>
                    <value>-0.6500</value>
                </product>
            </function>
            <function name="aero/coefficient/Cmde">
                <description>Pitch_moment_due_to_elevator</description>
                <product>
                    <property>aero/qbar-psf</property>
                    <property>metrics/Sw-sqft</property>
                    <property>metrics/cbarw-ft</property>
                    <property>fcs/elevator-pos-rad</property>
                    <value>-0.9000</value>
                </product>
            </function>
            <function name="aero/coefficient/Cmq">
                <description>Pitch_moment_due_to_pitch_rate</description>
                <product>
                    <property>aero/qbar-psf</property>
                    <property>metrics/Sw-sqft</property>
                    <property>metrics/cbarw-ft</property>
                    <property>aero/ci2vel</property>
                    <property>velocities/q-aero-rad_sec</property>
                    <value>-10.0000</value>
                </product>
            </function>
            <function name="aero/coefficient/Cmadot">
                <description>Pitch_moment_due_to_alpha_rate</description>
                <product>
                    <property>aero/qbar-psf</property>
                    <property>metrics/Sw-sqft</property>
                    <property>metrics/cbarw-ft</property>
                    <property>aero/ci2vel</property>
                    <property>aero/alphadot-rad_sec</property>
                    <value>-3.0000</value>
                </product>
            </function>
        </axis>

        <axis name="YAW">
            <function name="aero/coefficient/Cnb">
                <description>Yaw_moment_due_to_beta</description>
                <product>
                    <property>aero/qbar-psf</property>
                    <property>metrics/Sw-sqft</property>
                    <property>metrics/bw-ft</property>
                    <property>aero/beta-rad</property>
                    <value>0.0800</value>
                </product>
            </function>
            <function name="aero/coefficient/Cnr">
                <description>Yaw_moment_due_to_yaw_rate</description>
                <product>
                    <property>aero/qbar-psf</property>
                    <property>metrics/Sw-sqft</property>
                    <property>metrics/bw-ft</property>
                    <property>aero/bi2vel</property>
                    <property>velocities/r-aero-rad_sec</property>
                    <value>-0.1200</value>
                </product>
            </function>
            <function name="aero/coefficient/Cndr">
                <description>Yaw_moment_due_to_rudder</description>
                <product>
                    <property>aero/qbar-psf</property>
                    <property>metrics/Sw-sqft</property>
                    <property>metrics/bw-ft</property>
                    <property>fcs/rudder-pos-rad</property>
                    <value>-0.0800</value>
                </product>
            </function>
            <function name="aero/coefficient/Cnda">
                <description>Adverse_yaw</description>
                <product>
                    <property>aero/qbar-psf</property>
                    <property>metrics/Sw-sqft</property>
                    <property>metrics/bw-ft</property>
                    <property>fcs/left-aileron-pos-rad</property>
                    <value>-0.0200</value>
                </product>
            </function>
        </axis>

    </aerodynamics>
</fdm_config>
