 <aerodynamics>

  <axis name="LIFT">

    <function name="aero/force/Lift_alpha">
      <description>Lift due to alpha</description>
      <product>
          <property>aero/qbar-psf</property>
          <property>metrics/Sw-sqft</property>
          <table>
            <independentVar lookup="row">aero/alpha-deg</independentVar>
            <tableData>
              -180   0.0
              -140  -0.63
              -110  -0.63
              -102  -0.74
              -98  -0.64
              -90  0.07
              -79  1.15
              -76  1.2
              -70  1.1
              -45  1.2
               0   0.0
               40  -0.74
               80  -0.74
               90  0.0
               110 0.74
               135 0.8
               180 0.0
            </tableData>
          </table>
      </product>
    </function>

  </axis>

  <axis name="DRAG">

    <function name="aero/force/Drag_basic">
       <description>Drag</description>
       <product>
          <property>aero/qbar-psf</property>
          <property>metrics/Sw-sqft</property>
          <table>
            <independentVar lookup="row">aero/alpha-deg</independentVar>
            <tableData>
             -180    1.1
             -160    1
             -98     0.27
             -92     0.24
             -88     0.225
             -84     0.24
             -78     0.27
             -20     1
             0       1.1
             20      1
             90      0.3
             160     1
             180     1.1
            </tableData>
          </table>
          <value>2.0</value>
       </product>
    </function>

  </axis>

  <axis name="SIDE">

    <function name="aero/force/Side_beta">
       <description>Side force due to beta</description>
       <product>
           <property>aero/qbar-psf</property>
           <property>metrics/Sw-sqft</property>
           <property>aero/beta-rad</property>
           <value>-0</value>
       </product>
    </function>

  </axis>

 </aerodynamics>
