<?xml version="1.0"?>
<?xml-stylesheet type="text/xsl" href="http://jsbsim.sourceforge.net/JSBSim.xsl"?>
<fdm_config name="QUAD COMPLETE EXT" version="2.0" release="BETA" xmlns:xsi="http://www.w3.org/2001/XMLSchema-instance" xsi:noNamespaceSchemaLocation="http://jsbsim.sourceforge.net/JSBSim.xsd">

  <fileheader>
    <author>Ewoud Smeur</author>
    <filecreationdate>07-03-2017</filecreationdate>
    <version>Version 0.9 - beta</version>
    <description>Bebop1 with actuator dynamics (NE/SW turning CCW, NW/SE CW)</description>
  </fileheader>

  <metrics>
    <wingarea unit="IN2"> 78.53 </wingarea>
    <wingspan unit="IN"> 10 </wingspan>
    <chord unit="IN"> 6.89 </chord>
    <htailarea unit="FT2"> 0 </htailarea>
    <htailarm unit="FT"> 0 </htailarm>
    <vtailarea unit="FT2"> 0 </vtailarea>
    <vtailarm unit="FT"> 0 </vtailarm>
    <location name="AERORP" unit="IN">
      <x> 0 </x>
      <y> 0 </y>
      <z> 0 </z>
    </location>
    <location name="EYEPOINT" unit="IN">
      <x> 0 </x>
      <y> 0 </y>
      <z> 0 </z>
    </location>
    <location name="VRP" unit="IN">
      <x> 0 </x>
      <y> 0 </y>
      <z> 0 </z>
    </location>
  </metrics>

  <mass_balance>
    <ixx unit="SLUG*FT2"> 0.001030 </ixx>
    <iyy unit="SLUG*FT2"> 0.001111 </iyy>
    <izz unit="SLUG*FT2"> 0.00081 </izz>
    <ixy unit="SLUG*FT2"> 0. </ixy>
    <ixz unit="SLUG*FT2"> 0. </ixz>
    <iyz unit="SLUG*FT2"> 0. </iyz>
        <emptywt unit="LBS"> 0.84 </emptywt>
    <location name="CG" unit="M">
      <x> 0 </x>
      <y> 0 </y>
      <z> 0 </z>
    </location>
  </mass_balance>

  <ground_reactions>
    <contact type="STRUCTURE" name="CONTACT_FRONT">
      <location unit="M">
        <x>-0.15 </x>
        <y> 0 </y>
        <z>-0.1 </z>
      </location>
      <static_friction>  0.8 </static_friction>
      <dynamic_friction> 0.5 </dynamic_friction>
      <spring_coeff unit="N/M"> 500 </spring_coeff>
      <damping_coeff unit="N/M/SEC"> 100 </damping_coeff>
      <damping_coeff_rebound type="SQUARE" unit="N/M2/SEC2"> 1000 </damping_coeff_rebound>
      <max_steer unit="DEG"> 0.0 </max_steer>
      <brake_group> NONE </brake_group>
      <retractable>0</retractable>
    </contact>

    <contact type="STRUCTURE" name="CONTACT_BACK">
      <location unit="M">
        <x> 0.15</x>
        <y> 0   </y>
        <z>-0.1 </z>
      </location>
      <static_friction>  0.8 </static_friction>
      <dynamic_friction> 0.5 </dynamic_friction>
      <spring_coeff unit="N/M"> 500 </spring_coeff>
      <damping_coeff unit="N/M/SEC"> 100 </damping_coeff>
      <damping_coeff_rebound type="SQUARE" unit="N/M2/SEC2"> 1000 </damping_coeff_rebound>
      <max_steer unit="DEG"> 0.0 </max_steer>
      <brake_group> NONE </brake_group>
      <retractable>0</retractable>
    </contact>

    <contact type="STRUCTURE" name="CONTACT_RIGHT">
      <location unit="M">
        <x> 0.  </x>
        <y> 0.15</y>
        <z>-0.1 </z>
      </location>
      <static_friction>  0.8 </static_friction>
      <dynamic_friction> 0.5 </dynamic_friction>
      <spring_coeff unit="N/M"> 500 </spring_coeff>
      <damping_coeff unit="N/M/SEC"> 100 </damping_coeff>
      <damping_coeff_rebound type="SQUARE" unit="N/M2/SEC2"> 1000 </damping_coeff_rebound>
      <max_steer unit="DEG"> 0.0 </max_steer>
      <brake_group> NONE </brake_group>
      <retractable>0</retractable>
    </contact>

    <contact type="STRUCTURE" name="CONTACT_LEFT">
      <location unit="M">
        <x> 0.  </x>
        <y>-0.15</y>
        <z>-0.1 </z>
      </location>
      <static_friction>  0.8 </static_friction>
      <dynamic_friction> 0.5 </dynamic_friction>
      <spring_coeff unit="N/M"> 500 </spring_coeff>
      <damping_coeff unit="N/M/SEC"> 100 </damping_coeff>
      <damping_coeff_rebound type="SQUARE" unit="N/M2/SEC2"> 1000 </damping_coeff_rebound>
      <max_steer unit="DEG"> 0.0 </max_steer>
      <brake_group> NONE </brake_group>
      <retractable>0</retractable>
    </contact>
  </ground_reactions>

  <flight_control name="actuator_dynamics">
    <channel name="filtering">

      <!--First order filter represents actuator dynamics-->
      <lag_filter name="ne_motor_lag">
        <input> fcs/ne_motor </input>
        <c1> 30 </c1>
        <output> fcs/ne_motor_lag</output>
      </lag_filter>
      <lag_filter name="se_motor_lag">
        <input> fcs/se_motor </input>
        <c1> 30 </c1>
        <output> fcs/se_motor_lag</output>
      </lag_filter>
      <lag_filter name="sw_motor_lag">
        <input> fcs/sw_motor </input>
        <c1> 30 </c1>
        <output> fcs/sw_motor_lag</output>
      </lag_filter>
      <lag_filter name="nw_motor_lag">
        <input> fcs/nw_motor </input>
        <c1> 30 </c1>
        <output> fcs/nw_motor_lag</output>
      </lag_filter>
      <lag_filter name="pusher_lag">
        <input> fcs/pusher </input>
        <c1> 30 </c1>
        <output> fcs/pusher_lag</output>
      </lag_filter>

      <!--Derivative of actuator dynamics for spinup torque-->
      <washout_filter name="ne_motor_d">
        <input> fcs/ne_motor </input>
        <c1> 30 </c1>
        <output> fcs/ne_motor_d</output>
      </washout_filter>
      <washout_filter name="se_motor_d">
        <input> fcs/se_motor </input>
        <c1> 30 </c1>
        <output> fcs/se_motor_d</output>
      </washout_filter>
      <washout_filter name="sw_motor_d">
        <input> fcs/sw_motor </input>
        <c1> 30 </c1>
        <output> fcs/sw_motor_d</output>
      </washout_filter>
      <washout_filter name="nw_motor_d">
        <input> fcs/nw_motor </input>
        <c1> 30 </c1>
        <output> fcs/nw_motor_d</output>
      </washout_filter>

      <pure_gain name="g2timesactd">
        <input>fcs/ne_motor_d</input>
        <gain>0.295</gain>
        <output>fcs/g2timesactd</output>
      </pure_gain>
      <pure_gain name="g1timesact">
        <input>fcs/ne_motor_lag</input>
        <gain>0.0425</gain>
        <output>fcs/g1timesact</output>
      </pure_gain>
      <summer name="summer0">
        <input>fcs/g2timesactd</input>
        <input>fcs/g1timesact</input>
        <output>fcs/yawcontrol</output>
      </summer>

      <pure_gain name="g2timesactd1">
        <input>fcs/se_motor_d</input>
        <gain>0.295</gain>
        <output>fcs/g2timesactd1</output>
      </pure_gain>
      <pure_gain name="g1timesact1">
        <input>fcs/se_motor_lag</input>
        <gain>0.0425</gain>
        <output>fcs/g1timesact1</output>
      </pure_gain>
      <summer name="summer1">
        <input>fcs/g2timesactd1</input>
        <input>fcs/g1timesact1</input>
        <output>fcs/yawcontrol1</output>
      </summer>

      <pure_gain name="g2timesactd2">
        <input>fcs/sw_motor_d</input>
        <gain>0.295</gain>
        <output>fcs/g2timesactd2</output>
      </pure_gain>
      <pure_gain name="g1timesact">
        <input>fcs/sw_motor_lag</input>
        <gain>0.0425</gain>
        <output>fcs/g1timesact2</output>
      </pure_gain>
      <summer name="summer2">
        <input>fcs/g2timesactd2</input>
        <input>fcs/g1timesact2</input>
        <output>fcs/yawcontrol2</output>
      </summer>

      <pure_gain name="g2timesactd3">
        <input>fcs/nw_motor_d</input>
        <gain>0.295</gain>
        <output>fcs/g2timesactd3</output>
      </pure_gain>
      <pure_gain name="g1timesact">
        <input>fcs/nw_motor_lag</input>
        <gain>0.0425</gain>
        <output>fcs/g1timesact3</output>
      </pure_gain>
      <summer name="summer3">
        <input>fcs/g2timesactd3</input>
        <input>fcs/g1timesact3</input>
        <output>fcs/yawcontrol3</output>
      </summer>
    </channel>
  </flight_control>

  <external_reactions>

    <property>fcs/ne_motor</property>
    <property>fcs/ne_motor_lag</property>
    <property>fcs/se_motor</property>
    <property>fcs/se_motor_lag</property>
    <property>fcs/sw_motor</property>
    <property>fcs/sw_motor_lag</property>
    <property>fcs/nw_motor</property>
    <property>fcs/nw_motor_lag</property>
    <property>fcs/pusher</property>
    <property>fcs/pusher_lag</property>


    <!-- First the lift forces produced by each propeller -->

    <force name="ne_motor" frame="BODY" unit="LBS">
      <function>
        <product>
          <property>fcs/ne_motor_lag</property>
          <value> 0.42 </value>
        </product>
      </function>
      <location unit="IN">
        <x>-3.05</x>
        <y>3.74</y>
        <z>0</z>
      </location>
      <direction>
        <x>0</x>
        <y>0</y>
        <z>-1</z>
      </direction>
    </force>

    <force name="sw_motor" frame="BODY" unit="LBS">
      <function>
        <product>
          <property>fcs/sw_motor_lag</property>
          <value> 0.42 </value>
        </product>
      </function>
      <location unit="IN">
        <x>3.05</x>
        <y>-3.74</y>
        <z>0</z>
      </location>
      <direction>
        <x>0</x>
        <y>0</y>
        <z>-1</z>
      </direction>
    </force>

    <force name="se_motor" frame="BODY" unit="LBS">
      <function>
        <product>
          <property>fcs/se_motor_lag</property>
          <value> 0.42 </value>
        </product>
      </function>
      <location unit="IN">
        <x>3.05</x>
        <y>3.74</y>
        <z>0</z>
      </location>
      <direction>
        <x>0</x>
        <y>0</y>
        <z>-1</z>
      </direction>
    </force>

    <force name="nw_motor" frame="BODY" unit="LBS">
      <function>
        <product>
          <property>fcs/nw_motor_lag</property>
          <value> 0.42 </value>
        </product>
      </function>
      <location unit="IN">
        <x>-3.05</x>
        <y>-3.74</y>
        <z>0</z>
      </location>
      <direction>
        <x>0</x>
        <y>0</y>
        <z>-1</z>
      </direction>
    </force>

    <force name="pusher" frame="BODY" unit="LBS">
      <function>
        <product>
          <property>fcs/pusher_lag</property>
          <value> 1.31 </value>
        </product>
      </function>
      <location unit="IN">
        <x>0</x>
        <y>0</y>
        <z>0</z>
      </location>
      <direction>
        <x>1</x>
        <y>0</y>
        <z>0</z>
      </direction>
    </force>

    <!-- Then the Moment Couples -->


    <force name="ne_couple1" frame="BODY" unit="LBS">
      <function>
        <product>
          <property>fcs/yawcontrol</property>
          <value> -1.0 </value>
        </product>
      </function>
      <location unit="IN">
        <!-- Necessary arm in IN to produce a moment ten times
        "weaker" then the force when both are measured in the SI is 1.9685 in. -->
        <x>-4.87</x>
        <y>6.8385</y>
        <z>0</z>
      </location>
      <direction>
        <x>-1</x>
        <y>0</y>
        <z>0</z>
      </direction>
    </force>

    <force name="ne_couple2" frame="BODY" unit="LBS">
      <function>
        <product>
          <property>fcs/yawcontrol</property>
          <value> -1.0 </value>
        </product>
      </function>
      <location unit="IN">
        <x>-4.87</x>
        <y>2.9015</y>
        <z>0</z>
      </location>
      <direction>
        <x>1</x>
        <y>0</y>
        <z>0</z>
      </direction>
    </force>


    <force name="se_couple1" frame="BODY" unit="LBS">
      <function>
        <product>
          <property>fcs/yawcontrol1</property>
          <value> -1.0 </value>
        </product>
      </function>
      <location unit="IN">
        <x>4.87</x>
        <y>6.8385</y>
        <z>0</z>
      </location>
      <direction>
        <x>1</x>
        <y>0</y>
        <z>0</z>
      </direction>
    </force>

    <force name="se_couple2" frame="BODY" unit="LBS">
      <function>
        <product>
          <property>fcs/yawcontrol1</property>
          <value> -1.0 </value>
        </product>
      </function>
      <location unit="IN">
        <x>4.87</x>
        <y>2.9015</y>
        <z>0</z>
      </location>
      <direction>
        <x>-1</x>
        <y>0</y>
        <z>0</z>
      </direction>
    </force>


    <force name="sw_couple1" frame="BODY" unit="LBS">
      <function>
        <product>
          <property>fcs/yawcontrol2</property>
          <value> -1.0 </value>
        </product>
      </function>
      <location unit="IN">
        <x>4.87</x>
        <y>-2.9015</y>
        <z>0</z>
      </location>
      <direction>
        <x>-1</x>
        <y>0</y>
        <z>0</z>
      </direction>
    </force>

    <force name="sw_couple2" frame="BODY" unit="LBS">
      <function>
        <product>
          <property>fcs/yawcontrol2</property>
          <value> -1.0 </value>
        </product>
      </function>
      <location unit="IN">
        <x>4.87</x>
        <y>-6.8385</y>
        <z>0</z>
      </location>
      <direction>
        <x>1</x>
        <y>0</y>
        <z>0</z>
      </direction>
    </force>


    <force name="nw_couple1" frame="BODY" unit="LBS">
      <function>
        <product>
          <property>fcs/yawcontrol3</property>
          <value> -1.0 </value>
        </product>
      </function>
      <location unit="IN">
        <x>-4.87</x>
        <y>-2.9015</y>
        <z>0</z>
      </location>
      <direction>
        <x>1</x>
        <y>0</y>
        <z>0</z>
      </direction>
    </force>

    <force name="nw_couple2" frame="BODY" unit="LBS">
      <function>
        <product>
          <property>fcs/yawcontrol3</property>
          <value> -1.0 </value>
        </product>
      </function>
      <location unit="IN">
        <x>-4.87</x>
        <y>-6.8385</y>
        <z>0</z>
      </location>
      <direction>
        <x>-1</x>
        <y>0</y>
        <z>0</z>
      </direction>
    </force>

  </external_reactions>

  <propulsion/>

  <flight_control name="FGFCS"/>

  <aerodynamics>
    <axis name="DRAG">
      <function name="aero/coefficient/CD">
        <description>Drag</description>
        <product>
          <property>aero/qbar-psf</property>
          <value>47.9</value> <!-- Conversion to pascals -->
          <value>0.0151</value> <!-- CD x Area (m^2) -->
          <value>0.224808943</value> <!-- N to LBS -->
        </product>
      </function>
    </axis>
  </aerodynamics>

</fdm_config>
