<?xml version="1.0"?>
<?xml-stylesheet type="text/xsl" href="http://jsbsim.sourceforge.net/JSBSim.xsl"?>
<fdm_config name="QUAD COMPLETE EXT" version="2.0" release="BETA" xmlns:xsi="http://www.w3.org/2001/XMLSchema-instance" xsi:noNamespaceSchemaLocation="http://jsbsim.sourceforge.net/JSBSim.xsd">

  <fileheader>
    <author>Ewoud Smeur</author>
    <filecreationdate>07-03-2017</filecreationdate>
    <version>Version 0.9 - beta</version>
    <description>Cyclone</description>
  </fileheader>

  <metrics>
    <wingarea unit="IN2"> 115 </wingarea>
    <wingspan unit="IN"> 35.4 </wingspan>
    <chord unit="IN"> 7.09 </chord>
    <htailarea unit="FT2"> 0 </htailarea>
    <htailarm unit="FT"> 0 </htailarm>
    <vtailarea unit="FT2"> 0 </vtailarea>
    <vtailarm unit="FT"> 0 </vtailarm>
    <wing_incidence unit="DEG"> 90 </wing_incidence>
    <location name="AERORP" unit="IN">
      <x> 0 </x>
      <y> 0 </y>
      <z> 0 </z>
    </location>
    <location name="EYEPOINT" unit="IN">
      <x> 0 </x>
      <y> 0 </y>
      <z> 0 </z>
    </location>
    <location name="VRP" unit="IN">
      <x> 0 </x>
      <y> 0 </y>
      <z> 0 </z>
    </location>
  </metrics>

  <mass_balance>
    <ixx unit="SLUG*FT2"> 0.0132 </ixx>
    <iyy unit="SLUG*FT2"> 0.00250 </iyy>
    <izz unit="SLUG*FT2"> 0.0150 </izz>
    <ixy unit="SLUG*FT2"> 0. </ixy>
    <ixz unit="SLUG*FT2"> 0. </ixz>
    <iyz unit="SLUG*FT2"> 0. </iyz>
        <emptywt unit="LBS"> 2.4 </emptywt>
    <location name="CG" unit="M">
      <x> 0 </x>
      <y> 0 </y>
      <z> 0 </z>
    </location>
  </mass_balance>

  <ground_reactions>
    <contact type="STRUCTURE" name="CONTACT_FRONT">
      <location unit="M">
        <x>-0.15 </x>
        <y> 0 </y>
        <z>-0.1 </z>
      </location>
      <static_friction>  0.8 </static_friction>
      <dynamic_friction> 0.5 </dynamic_friction>
      <spring_coeff unit="N/M"> 500 </spring_coeff>
      <damping_coeff unit="N/M/SEC"> 100 </damping_coeff>
      <damping_coeff_rebound type="SQUARE" unit="N/M2/SEC2"> 1000 </damping_coeff_rebound>
      <max_steer unit="DEG"> 0.0 </max_steer>
      <brake_group> NONE </brake_group>
      <retractable>0</retractable>
    </contact>

    <contact type="STRUCTURE" name="CONTACT_BACK">
      <location unit="M">
        <x> 0.15</x>
        <y> 0   </y>
        <z>-0.1 </z>
      </location>
      <static_friction>  0.8 </static_friction>
      <dynamic_friction> 0.5 </dynamic_friction>
      <spring_coeff unit="N/M"> 500 </spring_coeff>
      <damping_coeff unit="N/M/SEC"> 100 </damping_coeff>
      <damping_coeff_rebound type="SQUARE" unit="N/M2/SEC2"> 1000 </damping_coeff_rebound>
      <max_steer unit="DEG"> 0.0 </max_steer>
      <brake_group> NONE </brake_group>
      <retractable>0</retractable>
    </contact>

    <contact type="STRUCTURE" name="CONTACT_RIGHT">
      <location unit="M">
        <x> 0.  </x>
        <y> 0.15</y>
        <z>-0.1 </z>
      </location>
      <static_friction>  0.8 </static_friction>
      <dynamic_friction> 0.5 </dynamic_friction>
      <spring_coeff unit="N/M"> 500 </spring_coeff>
      <damping_coeff unit="N/M/SEC"> 100 </damping_coeff>
      <damping_coeff_rebound type="SQUARE" unit="N/M2/SEC2"> 1000 </damping_coeff_rebound>
      <max_steer unit="DEG"> 0.0 </max_steer>
      <brake_group> NONE </brake_group>
      <retractable>0</retractable>
    </contact>

    <contact type="STRUCTURE" name="CONTACT_LEFT">
      <location unit="M">
        <x> 0.  </x>
        <y>-0.15</y>
        <z>-0.1 </z>
      </location>
      <static_friction>  0.8 </static_friction>
      <dynamic_friction> 0.5 </dynamic_friction>
      <spring_coeff unit="N/M"> 500 </spring_coeff>
      <damping_coeff unit="N/M/SEC"> 100 </damping_coeff>
      <damping_coeff_rebound type="SQUARE" unit="N/M2/SEC2"> 1000 </damping_coeff_rebound>
      <max_steer unit="DEG"> 0.0 </max_steer>
      <brake_group> NONE </brake_group>
      <retractable>0</retractable>
    </contact>
  </ground_reactions>

  <flight_control name="actuator_dynamics">
    <channel name="filtering">

      <!--First order filter represents actuator dynamics-->
      <lag_filter name="ELEVON_LEFT_lag">
        <input> fcs/ELEVON_LEFT </input>
        <c1> 54 </c1>
        <output> fcs/ELEVON_LEFT_lag</output>
      </lag_filter>
      <lag_filter name="ELEVON_RIGHT_lag">
        <input> fcs/ELEVON_RIGHT </input>
        <c1> 54 </c1>
        <output> fcs/ELEVON_RIGHT_lag</output>
      </lag_filter>
      <lag_filter name="MOTOR_RIGHT_lag">
        <input> fcs/MOTOR_RIGHT </input>
        <c1> 31.7 </c1>
        <output> fcs/MOTOR_RIGHT_lag</output>
      </lag_filter>
      <lag_filter name="MOTOR_LEFT_lag">
        <input> fcs/MOTOR_LEFT </input>
        <c1> 31.7 </c1>
        <output> fcs/MOTOR_LEFT_lag</output>
      </lag_filter>
    </channel>
  </flight_control>

  <external_reactions>

    <property>fcs/ELEVON_LEFT</property>
    <property>fcs/ELEVON_LEFT_lag</property>
    <property>fcs/ELEVON_RIGHT</property>
    <property>fcs/ELEVON_RIGHT_lag</property>
    <property>fcs/MOTOR_RIGHT</property>
    <property>fcs/MOTOR_RIGHT_lag</property>
    <property>fcs/MOTOR_LEFT</property>
    <property>fcs/MOTOR_LEFT_lag</property>
    <property>fcs/ROLL_RATE</property>
    <property>fcs/PITCH_RATE</property>
    <property>fcs/YAW_RATE</property>
    <property>fcs/YAW</property>
    <property>fcs/THRUST</property>

    <!-- First the lift forces produced by each propeller -->

    <force name="MOTOR_RIGHT" frame="BODY" unit="LBS">
      <function>
        <product>
          <property>fcs/MOTOR_RIGHT_lag</property>
          <value> 2.2 </value>
        </product>
      </function>
      <location unit="IN">
        <x>0</x>
        <y>9.4</y>
        <z>0</z>
      </location>
      <direction>
        <x>0</x>
        <y>0</y>
        <z>-1</z>
      </direction>
    </force>

    <force name="MOTOR_LEFT" frame="BODY" unit="LBS">
      <function>
        <product>
          <property>fcs/MOTOR_LEFT_lag</property>
          <value> 2.2 </value>
        </product>
      </function>
      <location unit="IN">
        <x>0</x>
        <y>-9.4</y>
        <z>0</z>
      </location>
      <direction>
        <x>0</x>
        <y>0</y>
        <z>-1</z>
      </direction>
    </force>

    <!--Yaw moments-->

  </external_reactions>

  <propulsion/>

  <flight_control name="FGFCS"/>

  <!--<aerodynamics>-->
    <!--<axis name="DRAG">-->
      <!--<function name="aero/coefficient/CD">-->
        <!--<description>Drag</description>-->
        <!--<product>-->
          <!--<property>aero/qbar-psf</property>-->
          <!--<value>47.9</value> [> Conversion to pascals <]-->
          <!--<value>0.0151</value> [> CD x Area (m^2) <]-->
          <!--<value>0.224808943</value> [> N to LBS <]-->
        <!--</product>-->
      <!--</function>-->
    <!--</axis>-->
  <!--</aerodynamics>-->
  <aerodynamics file="Systems/aerodynamics_cyfoam.xml"/>

</fdm_config>
