<?xml version="1.0"?>
<?xml-stylesheet type="text/xsl" href="http://jsbsim.sourceforge.net/JSBSim.xsl"?>
<fdm_config name="QUAD COMPLETE EXT" version="2.0" release="BETA" xmlns:xsi="http://www.w3.org/2001/XMLSchema-instance" xsi:noNamespaceSchemaLocation="http://jsbsim.sourceforge.net/JSBSim.xsd">

  <fileheader>
    <author>Ewoud Smeur</author>
    <filecreationdate>07-03-2017</filecreationdate>
    <version>Version 0.9 - beta</version>
    <description>Bebop1 with actuator dynamics (NE/SW turning CCW, NW/SE CW)</description>
  </fileheader>

  <metrics>
    <wingarea unit="IN2"> 78.53 </wingarea>
    <wingspan unit="IN"> 10 </wingspan>
    <chord unit="IN"> 6.89 </chord>
    <htailarea unit="FT2"> 0 </htailarea>
    <htailarm unit="FT"> 0 </htailarm>
    <vtailarea unit="FT2"> 0.686 </vtailarea>
    <vtailarm unit="FT"> 1.32 </vtailarm>
    <location name="AERORP" unit="IN">
      <x> 0 </x>
      <y> 0 </y>
      <z> 0 </z>
    </location>
    <location name="EYEPOINT" unit="IN">
      <x> 0 </x>
      <y> 0 </y>
      <z> 0 </z>
    </location>
    <location name="VRP" unit="IN">
      <x> 0 </x>
      <y> 0 </y>
      <z> 0 </z>
    </location>
  </metrics>

  <mass_balance>
    <ixx unit="SLUG*FT2"> 0.670741277</ixx>
    <iyy unit="SLUG*FT2"> 4.953005118</iyy>
    <izz unit="SLUG*FT2"> 2.181137393</izz>
    <ixy unit="SLUG*FT2"> 0. </ixy>
    <ixz unit="SLUG*FT2"> 0. </ixz>
    <iyz unit="SLUG*FT2"> 0. </iyz>
        <emptywt unit="LBS"> 56 </emptywt>
    <location name="CG" unit="M">
      <x> 0 </x>
      <y> 0 </y>
      <z> 0 </z>
    </location>
  </mass_balance>

  <ground_reactions>
    <contact type="STRUCTURE" name="CONTACT_FRONT">
      <location unit="M">
        <x>-0.5 </x>
        <y> 0 </y>
        <z>-0.1 </z>
      </location>
      <static_friction>  0.8 </static_friction>
      <dynamic_friction> 0.5 </dynamic_friction>
      <spring_coeff unit="N/M"> 500 </spring_coeff>
      <damping_coeff unit="N/M/SEC"> 100 </damping_coeff>
      <damping_coeff_rebound type="SQUARE" unit="N/M2/SEC2"> 1000 </damping_coeff_rebound>
      <max_steer unit="DEG"> 0.0 </max_steer>
      <brake_group> NONE </brake_group>
      <retractable>0</retractable>
    </contact>

    <contact type="STRUCTURE" name="CONTACT_BACK">
      <location unit="M">
        <x> 0.5</x>
        <y> 0   </y>
        <z>-0.1 </z>
      </location>
      <static_friction>  0.8 </static_friction>
      <dynamic_friction> 0.5 </dynamic_friction>
      <spring_coeff unit="N/M"> 500 </spring_coeff>
      <damping_coeff unit="N/M/SEC"> 100 </damping_coeff>
      <damping_coeff_rebound type="SQUARE" unit="N/M2/SEC2"> 1000 </damping_coeff_rebound>
      <max_steer unit="DEG"> 0.0 </max_steer>
      <brake_group> NONE </brake_group>
      <retractable>0</retractable>
    </contact>

    <contact type="STRUCTURE" name="CONTACT_RIGHT">
      <location unit="M">
        <x> 0.  </x>
        <y> 0.5</y>
        <z>-0.1 </z>
      </location>
      <static_friction>  0.8 </static_friction>
      <dynamic_friction> 0.5 </dynamic_friction>
      <spring_coeff unit="N/M"> 500 </spring_coeff>
      <damping_coeff unit="N/M/SEC"> 100 </damping_coeff>
      <damping_coeff_rebound type="SQUARE" unit="N/M2/SEC2"> 1000 </damping_coeff_rebound>
      <max_steer unit="DEG"> 0.0 </max_steer>
      <brake_group> NONE </brake_group>
      <retractable>0</retractable>
    </contact>

    <contact type="STRUCTURE" name="CONTACT_LEFT">
      <location unit="M">
        <x> 0.  </x>
        <y>-0.5</y>
        <z>-0.1 </z>
      </location>
      <static_friction>  0.8 </static_friction>
      <dynamic_friction> 0.5 </dynamic_friction>
      <spring_coeff unit="N/M"> 500 </spring_coeff>
      <damping_coeff unit="N/M/SEC"> 100 </damping_coeff>
      <damping_coeff_rebound type="SQUARE" unit="N/M2/SEC2"> 1000 </damping_coeff_rebound>
      <max_steer unit="DEG"> 0.0 </max_steer>
      <brake_group> NONE </brake_group>
      <retractable>0</retractable>
    </contact>
  </ground_reactions>

  <flight_control name="actuator_dynamics">
    <channel name="filtering">

    <!-- Note: skew angle is normalized -->
      <fcs_function name="sinskew">
        <function>
          <sin>
            <product>
              <property>fcs/skew</property>
              <value>0.5</value>
              <pi/>
            </product>
          </sin>
        </function>
        <output> fcs/sinskew </output>
      </fcs_function>

    <!-- Note: skew angle is normalized -->
      <fcs_function name="cosskew">
        <function>
          <cos>
            <product>
              <property>fcs/skew</property>
              <value>0.5</value>
              <pi/>
            </product>
          </cos>
        </function>
        <output> fcs/cosskew </output>
      </fcs_function>

      <!--First order filter represents actuator dynamics-->
      <lag_filter name="front_motor_lag">
        <input> fcs/front_motor </input>
        <c1> 18 </c1>
        <output> fcs/front_motor_lag</output>
      </lag_filter>
      <lag_filter name="right_motor_lag">
        <input> fcs/right_motor </input>
        <c1> 18 </c1>
        <output> fcs/right_motor_lag</output>
      </lag_filter>
      <lag_filter name="back_motor_lag">
        <input> fcs/back_motor </input>
        <c1> 18 </c1>
        <output> fcs/back_motor_lag</output>
      </lag_filter>
      <lag_filter name="left_motor_lag">
        <input> fcs/left_motor </input>
        <c1> 18 </c1>
        <output> fcs/left_motor_lag</output>
      </lag_filter>
      <lag_filter name="pusher_lag">
        <input> fcs/pusher </input>
        <c1> 18 </c1>
        <output> fcs/pusher_lag</output>
      </lag_filter>
    </channel>
  </flight_control>

  <external_reactions>

    <property>fcs/front_motor</property>
    <property>fcs/front_motor_lag</property>
    <property>fcs/right_motor</property>
    <property>fcs/right_motor_lag</property>
    <property>fcs/back_motor</property>
    <property>fcs/back_motor_lag</property>
    <property>fcs/left_motor</property>
    <property>fcs/left_motor_lag</property>
    <property>fcs/rudder</property>
    <property>fcs/elevator</property>
    <property>fcs/aileron</property>
    <property>fcs/flaperon</property>
    <property>fcs/pusher</property>
    <property>fcs/pusher_lag</property>
    <property>fcs/skew</property>

    <!-- First the lift forces produced by each propeller -->

    <force name="front_motor" frame="BODY" unit="LBS">
      <function>
      <sum>
        <product>
          <property>fcs/front_motor_lag</property>
          <value> 26.06 </value>
        </product>
        <product>
          <property>fcs/right_motor_lag</property>
          <property>fcs/sinskew</property>
          <value> 26.06 </value>
        </product>
      </sum>
      </function>
      <location unit="IN">
        <x>-21.89</x>
        <y>0</y>
        <z>0</z>
      </location>
      <direction>
        <x>0</x>
        <y>0</y>
        <z>-1</z>
      </direction>
    </force>

    <force name="right_motor" frame="BODY" unit="LBS">
      <function>
        <product>
          <property>fcs/right_motor_lag</property>
          <property>fcs/cosskew</property>
          <value> 26.06 </value>
        </product>
      </function>
      <location unit="IN">
        <x>0</x>
        <y>25.197</y>
        <z>0</z>
      </location>
      <direction>
        <x>0</x>
        <y>0</y>
        <z>-1</z>
      </direction>
    </force>

    <force name="back_motor" frame="BODY" unit="LBS">
      <function>
        <sum>
          <product>
            <property>fcs/back_motor_lag</property>
            <value> 26.06 </value>
          </product>
          <product>
              <property>fcs/left_motor_lag</property>
              <property>fcs/sinskew</property>
              <value> 26.06 </value>
          </product>
        </sum>
      </function>
      <location unit="IN">
        <x>21.89</x>
        <y>0</y>
        <z>0</z>
      </location>
      <direction>
        <x>0</x>
        <y>0</y>
        <z>-1</z>
      </direction>
    </force>

    <force name="left_motor" frame="BODY" unit="LBS">
      <function>
        <product>
          <property>fcs/left_motor_lag</property>
          <property>fcs/cosskew</property>
          <value> 26.06 </value>
        </product>
      </function>
      <location unit="IN">
        <x>0</x>
        <y>-25.197</y>
        <z>0</z>
      </location>
      <direction>
        <x>0</x>
        <y>0</y>
        <z>-1</z>
      </direction>
    </force>

    <force name="pusher_motor" frame="BODY" unit="LBS">
      <function>
        <product>
          <property>fcs/pusher_lag</property>
          <value> 25.77 </value>
        </product>
      </function>
      <location unit="IN">
        <x>0</x>
        <y>0</y>
        <z>0</z>
      </location>
      <direction>
        <x>1</x>
        <y>0</y>
        <z>0</z>
      </direction>
    </force>

    <!-- Now the moment couples -->
    <force name="front_motor_couple1" frame="BODY" unit="LBS">
      <function>
        <product>
          <property>fcs/front_motor_lag</property>
          <value> 3.19 </value>
        </product>
      </function>
      <location unit="IN">
        <x>0</x>
        <y>19.68503935</y>
        <z>0</z>
      </location>
      <direction>
        <x>1</x>
        <y>0</y>
        <z>0</z>
      </direction>
    </force>

    <force name="front_motor_couple2" frame="BODY" unit="LBS">
      <function>
        <product>
          <property>fcs/front_motor_lag</property>
          <value> 3.19 </value>
        </product>
      </function>
      <location unit="IN">
        <x>0</x>
        <y>-19.68503935</y>
        <z>0</z>
      </location>
      <direction>
        <x>-1</x>
        <y>0</y>
        <z>0</z>
      </direction>
    </force>

    <force name="right_motor_couple1" frame="BODY" unit="LBS">
      <function>
        <product>
          <property>fcs/right_motor_lag</property>
          <value> 3.57 </value>
        </product>
      </function>
      <location unit="IN">
        <x>0</x>
        <y>19.68503935</y>
        <z>0</z>
      </location>
      <direction>
        <x>-1</x>
        <y>0</y>
        <z>0</z>
      </direction>
    </force>

    <force name="right_motor_couple2" frame="BODY" unit="LBS">
      <function>
        <product>
          <property>fcs/right_motor_lag</property>
          <value> 3.57 </value>
        </product>
      </function>
      <location unit="IN">
        <x>0</x>
        <y>-19.68503935</y>
        <z>0</z>
      </location>
      <direction>
        <x>1</x>
        <y>0</y>
        <z>0</z>
      </direction>
    </force>

    <force name="back_motor_couple1" frame="BODY" unit="LBS">
      <function>
        <product>
          <property>fcs/back_motor_lag</property>
          <value> 3.19 </value>
        </product>
      </function>
      <location unit="IN">
        <x>0</x>
        <y>19.68503935</y>
        <z>0</z>
      </location>
      <direction>
        <x>1</x>
        <y>0</y>
        <z>0</z>
      </direction>
    </force>

    <force name="back_motor_couple2" frame="BODY" unit="LBS">
      <function>
        <product>
          <property>fcs/back_motor_lag</property>
          <value> 3.19 </value>
        </product>
      </function>
      <location unit="IN">
        <x>0</x>
        <y>-19.68503935</y>
        <z>0</z>
      </location>
      <direction>
        <x>-1</x>
        <y>0</y>
        <z>0</z>
      </direction>
    </force>

    <force name="left_motor_couple1" frame="BODY" unit="LBS">
      <function>
        <product>
          <property>fcs/left_motor_lag</property>
          <value> 3.57 </value>
        </product>
      </function>
      <location unit="IN">
        <x>0</x>
        <y>19.68503935</y>
        <z>0</z>
      </location>
      <direction>
        <x>-1</x>
        <y>0</y>
        <z>0</z>
      </direction>
    </force>

    <force name="left_motor_couple2" frame="BODY" unit="LBS">
      <function>
        <product>
          <property>fcs/left_motor_lag</property>
          <value> 3.57 </value>
        </product>
      </function>
      <location unit="IN">
        <x>0</x>
        <y>-19.68503935</y>
        <z>0</z>
      </location>
      <direction>
        <x>1</x>
        <y>0</y>
        <z>0</z>
      </direction>
    </force>

  </external_reactions>

  <propulsion/>

  <flight_control name="FGFCS"/>

  <aerodynamics>
    <axis name="DRAG">
      <function name="aero/coefficient/CD">
        <description>Drag</description>
        <product>
          <property>aero/qbar-psf</property>
          <value>47.9</value> <!-- Conversion to pascals -->
          <value>0.0151</value> <!-- CD x Area (m^2) -->
          <value>0.224808943</value> <!-- N to LBS -->
          <value>100.0</value> <!-- some scaling factor -->
        </product>
      </function>
    </axis>

    <axis name="SIDE">
    <function name="aero/force/Side_beta">
       <description>Side force due to beta</description>
       <product>
           <property>aero/qbar-psf</property>
           <property>metrics/Sw-sqft</property>
           <property>aero/beta-rad</property>
           <value>-0</value>
       </product>
    </function>
  </axis>

  <axis name="YAW">
    <function name="directional stability" frame="BODY" unit="FT*LBS">
       <product>
           <property>aero/qbar-psf</property>
           <property>metrics/Sv-sqft</property>
           <property>aero/beta-rad</property>
           <value>10.0</value>
       </product>
    </function>
  </axis>
  </aerodynamics>

</fdm_config>
