<?xml version="1.0"?>
<?xml-stylesheet type="text/xsl" href="http://jsbsim.sourceforge.net/JSBSim.xsl"?>
<fdm_config name="QUAD COMPLETE EXT" version="2.0" release="BETA" xmlns:xsi="http://www.w3.org/2001/XMLSchema-instance" xsi:noNamespaceSchemaLocation="http://jsbsim.sourceforge.net/JSBSim.xsd">

  <fileheader>
    <author>Tomaso De Ponti</author>
    <filecreationdate>07-03-2017</filecreationdate>
    <version>Version 0.9 - beta</version>
    <description>RW3C with actuator dynamics</description>
  </fileheader>

  <metrics>
    <wingarea   unit="M2">   0 </wingarea>
    <wingspan   unit="M">    0 </wingspan>
    <chord      unit="M">    0 </chord>
    <htailarea  unit="M2">   0 </htailarea>
    <htailarm   unit="M">    0 </htailarm>
    <vtailarea  unit="M2">   0 </vtailarea>
    <vtailarm   unit="M">    0 </vtailarm>
    <location   name="AERORP" unit="M">
      <x> 0 </x>
      <y> 0 </y>
      <z> 0 </z>
    </location>
    <location name="EYEPOINT" unit="M">
      <x> 0 </x>
      <y> 0 </y>
      <z> 0 </z>
    </location>
    <location name="VRP" unit="M">
      <x> 0 </x>
      <y> 0 </y>
      <z> 0 </z>
    </location>
  </metrics>

  <mass_balance>
    <ixx unit="KG*M2">  0.1156</ixx>
    <iyy unit="KG*M2">  1.2639</iyy>
    <izz unit="KG*M2">  1.2842</izz> <!-- 1.2842 FIXME-->
    <ixy unit="KG*M2">  0.0 </ixy>
    <ixz unit="KG*M2">  0.0 </ixz>
    <iyz unit="KG*M2">  0.0 </iyz>
    <emptywt unit="KG"> 7.200 </emptywt>
    <location name="CG" unit="M">
      <x> 0 </x>
      <y> 0 </y>
      <z> 0 </z>
    </location>
  </mass_balance>

  <ground_reactions>
    <contact type="STRUCTURE" name="CONTACT_FRONT">
      <location unit="M">
        <x>-0.15 </x>
        <y> 0 </y>
        <z>-0.1 </z>
      </location>
      <static_friction>  0.8 </static_friction>
      <dynamic_friction> 0.5 </dynamic_friction>
      <spring_coeff unit="N/M"> 500 </spring_coeff>
      <damping_coeff unit="N/M/SEC"> 100 </damping_coeff>
      <damping_coeff_rebound type="SQUARE" unit="N/M2/SEC2"> 1000 </damping_coeff_rebound>
      <max_steer unit="DEG"> 0.0 </max_steer>
      <brake_group> NONE </brake_group>
      <retractable>0</retractable>
    </contact>

    <contact type="STRUCTURE" name="CONTACT_BACK">
      <location unit="M">
        <x> 0.15</x>
        <y> 0   </y>
        <z>-0.1 </z>
      </location>
      <static_friction>  0.8 </static_friction>
      <dynamic_friction> 0.5 </dynamic_friction>
      <spring_coeff unit="N/M"> 500 </spring_coeff>
      <damping_coeff unit="N/M/SEC"> 100 </damping_coeff>
      <damping_coeff_rebound type="SQUARE" unit="N/M2/SEC2"> 1000 </damping_coeff_rebound>
      <max_steer unit="DEG"> 0.0 </max_steer>
      <brake_group> NONE </brake_group>
      <retractable>0</retractable>
    </contact>

    <contact type="STRUCTURE" name="CONTACT_RIGHT">
      <location unit="M">
        <x> 0.  </x>
        <y> 0.15</y>
        <z>-0.1 </z>
      </location>
      <static_friction>  0.8 </static_friction>
      <dynamic_friction> 0.5 </dynamic_friction>
      <spring_coeff unit="N/M"> 500 </spring_coeff>
      <damping_coeff unit="N/M/SEC"> 100 </damping_coeff>
      <damping_coeff_rebound type="SQUARE" unit="N/M2/SEC2"> 1000 </damping_coeff_rebound>
      <max_steer unit="DEG"> 0.0 </max_steer>
      <brake_group> NONE </brake_group>
      <retractable>0</retractable>
    </contact>

    <contact type="STRUCTURE" name="CONTACT_LEFT">
      <location unit="M">
        <x> 0.  </x>
        <y>-0.15</y>
        <z>-0.1 </z>
      </location>
      <static_friction>  0.8 </static_friction>
      <dynamic_friction> 0.5 </dynamic_friction>
      <spring_coeff unit="N/M"> 500 </spring_coeff>
      <damping_coeff unit="N/M/SEC"> 100 </damping_coeff>
      <damping_coeff_rebound type="SQUARE" unit="N/M2/SEC2"> 1000 </damping_coeff_rebound>
      <max_steer unit="DEG"> 0.0 </max_steer>
      <brake_group> NONE </brake_group>
      <retractable>0</retractable>
    </contact>
  </ground_reactions>

  <flight_control name="actuator_dynamics">
    <channel name="filtering">

      <!--First order filter represents actuator dynamics-->
      <lag_filter name="MOTOR_FRONT_lag">
        <input> fcs/MOTOR_FRONT </input>
        <c1> 22.0 </c1>
        <output> fcs/MOTOR_FRONT_lag</output>
      </lag_filter>
      <lag_filter name="MOTOR_RIGHT_lag">
        <input> fcs/MOTOR_RIGHT </input>
        <c1> 22.0 </c1>
        <output> fcs/MOTOR_RIGHT_lag</output>
      </lag_filter>
      <lag_filter name="MOTOR_BACK_lag">
        <input> fcs/MOTOR_BACK </input>
        <c1> 22.0 </c1>
        <output> fcs/MOTOR_BACK_lag</output>
      </lag_filter>
      <lag_filter name="MOTOR_LEFT_lag">
        <input> fcs/MOTOR_LEFT </input>
        <c1> 22.0 </c1>
        <output> fcs/MOTOR_LEFT_lag</output>
      </lag_filter>
      <lag_filter name="MOTOR_PUSHER_lag">
        <input> fcs/MOTOR_PUSHER </input>
        <c1> 30.0 </c1>
        <output> fcs/MOTOR_PUSHER_lag</output>
      </lag_filter>
      <lag_filter name="ELEVATOR_lag">
        <input> fcs/ELEVATOR </input>
        <c1> 50.00 </c1>
        <output> fcs/ELEVATOR_lag</output>
      </lag_filter>
      <lag_filter name="RUDDER_lag">
        <input> fcs/RUDDER </input>
        <c1> 50.00 </c1>
        <output> fcs/RUDDER_lag</output>
      </lag_filter>
      <lag_filter name="AILERONS_lag">
        <input> fcs/AILERONS </input>
        <c1> 50.00 </c1>
        <output> fcs/AILERONS_lag</output>
      </lag_filter>
      <lag_filter name="FLAPS_lag">
        <input> fcs/FLAPS </input>
        <c1> 50.00 </c1>
        <output> fcs/FLAPS_lag</output>
      </lag_filter>
      <!--Derivative of actuator dynamics for spinup torque-->
      <washout_filter name="MOTOR_FRONT_d">
        <input> fcs/MOTOR_FRONT </input>
        <c1> 10.1 </c1>
        <output> fcs/MOTOR_FRONT_d</output>
      </washout_filter>
      <washout_filter name="MOTOR_RIGHT_d">
        <input> fcs/MOTOR_RIGHT </input>
        <c1> 10.1 </c1>
        <output> fcs/MOTOR_RIGHT_d</output>
      </washout_filter>
      <washout_filter name="MOTOR_BACK_d">
        <input> fcs/MOTOR_BACK </input>
        <c1> 10.1 </c1>
        <output> fcs/MOTOR_BACK_d</output>
      </washout_filter>
      <washout_filter name="MOTOR_LEFT_d">
        <input> fcs/MOTOR_LEFT </input>
        <c1> 10.1 </c1>
        <output> fcs/MOTOR_LEFT_d</output>
      </washout_filter>
    </channel>

    <channel name="skew_control">
      <fcs_function name="cosskew">
        <function>
          <cos>
            <product>
              <property>fcs/ROT_MECH</property>
              <value>0.5</value>
              <pi/>
            </product>
          </cos>
        </function>
      <output> fcs/cosskew </output>
      </fcs_function>

      <fcs_function name="cos2skew">
        <function>
          <pow>
            <p> fcs/cosskew </p>
            <v> 2.0 </v>
          </pow>
        </function>
      <output> fcs/cos2skew </output>
      </fcs_function>

      <fcs_function name="cos3skew">
        <function>
          <pow>
            <p> fcs/cosskew </p>
            <v> 3.0 </v>
          </pow>
        </function>
      <output> fcs/cos3skew </output>
      </fcs_function>

      <fcs_function name="sinskew">
        <function>
          <sin>
            <product>
              <property>fcs/ROT_MECH</property>
              <value>0.5</value>
              <pi/>
            </product>
          </sin>
        </function>
        <output> fcs/sinskew </output>
      </fcs_function>

      <fcs_function name="sin2skew">
        <function>
          <pow>
            <p> fcs/sinskew </p>
            <v> 2.0 </v>
          </pow>
        </function>
        <output> fcs/sin2skew </output>
      </fcs_function>

      <fcs_function name="sin3skew">
        <function>
          <pow>
            <p> fcs/sinskew </p>
            <v> 3.0 </v>
          </pow>
        </function>
        <output> fcs/sin3skew </output>
      </fcs_function>

      <fcs_function name="coscos3skew">
        <function>
          <sum>
            <property>fcs/cosskew</property>
            <product>
              <property>fcs/cos3skew</property>
              <value>-1</value>
            </product>
          </sum>
        </function>
        <output> fcs/coscos3skew </output>
      </fcs_function>
    </channel>
    <channel name="Effectiveness_Matrix">
      <!-- Scaling functions -->
      <fcs_function name="pprz2jsbsim">
          <function>
              <value>9600.0</value>
          </function>
          <output>fcs/pprz2jsbsim</output>
      </fcs_function>
      <fcs_function name="eff_scaler">
          <function>
              <value>0.001</value>
          </function>
          <output>fcs/eff_scaler</output>
      </fcs_function>
      <!-- Quad Motors-->
      <!-- Front Motor-->
      <fcs_function name="mF_T">
          <function>
              <sum>
            <product>
                  <value>5.00e-7</value>
              <property>fcs/MOTOR_FRONT_lag</property>
                  <property>fcs/MOTOR_FRONT_lag</property>
              <property>fcs/pprz2jsbsim</property>
                  <property>fcs/pprz2jsbsim</property>
            </product>
                <product>
                  <value>2.05e-4</value>
                  <property>fcs/MOTOR_FRONT_lag</property>
                  <property>fcs/pprz2jsbsim</property>
                </product>
                <value>1.43</value>
              </sum>
          </function>
          <output>fcs/mF_T</output>
      </fcs_function>
      <!-- Right Motor-->
      <fcs_function name="mR_T">
          <function>
              <sum>
            <product>
                  <value>5.37e-7</value>
              <property>fcs/MOTOR_RIGHT_lag</property>
                  <property>fcs/MOTOR_RIGHT_lag</property>
              <property>fcs/pprz2jsbsim</property>
                  <property>fcs/pprz2jsbsim</property>
            </product>
                <product>
                  <value>2.20e-4</value>
                  <property>fcs/MOTOR_RIGHT_lag</property>
                  <property>fcs/pprz2jsbsim</property>
                </product>
                <value>1.53</value>
              </sum>
          </function>
          <output>fcs/mR_T</output>
      </fcs_function>
      <!-- Back Motor-->
      <fcs_function name="mB_T">
          <function>
              <sum>
            <product>
                  <value>5.00e-7</value>
              <property>fcs/MOTOR_BACK_lag</property>
                  <property>fcs/MOTOR_BACK_lag</property>
              <property>fcs/pprz2jsbsim</property>
                  <property>fcs/pprz2jsbsim</property>
            </product>
                <product>
                  <value>2.05e-4</value>
                  <property>fcs/MOTOR_BACK_lag</property>
                  <property>fcs/pprz2jsbsim</property>
                </product>
                <value>1.43</value>
              </sum>
          </function>
          <output>fcs/mB_T</output>
      </fcs_function>
      <!-- Left Motor-->
      <fcs_function name="mL_T">
          <function>
              <sum>
            <product>
                  <value>5.37e-7</value>
              <property>fcs/MOTOR_LEFT_lag</property>
                  <property>fcs/MOTOR_LEFT_lag</property>
              <property>fcs/pprz2jsbsim</property>
                  <property>fcs/pprz2jsbsim</property>
            </product>
                <product>
                  <value>2.20e-4</value>
                  <property>fcs/MOTOR_LEFT_lag</property>
                  <property>fcs/pprz2jsbsim</property>
                </product>
                <value>1.53</value>
              </sum>
          </function>
          <output>fcs/mL_T</output>
      </fcs_function>
      <!-- Misc -->
      <fcs_function name="MQ_dFdu">
          <function>
              <value>3.835</value>
          </function>
          <output>fcs/MQ_dFdu</output>
      </fcs_function>
      <fcs_function name="MQ_dMdu">
          <function>
              <value>0.390</value>
          </function>
          <output>fcs/MQ_dMdu</output>
      </fcs_function>
      <fcs_function name="MQ_dMdud">
          <function>
              <value>0.02</value>
          </function>
          <output>fcs/MQ_dMdud</output>
      </fcs_function>
      <!-- Pusher Motor -->
      <fcs_function name="MP_dFdu">
          <function>
              <value>3.468</value>
          </function>
          <output>fcs/MP_dFdu</output>
      </fcs_function>
      <!-- Elevator -->
      <fcs_function name="ELE_dFdu">
          <function>
              <value>19.360</value>
          </function>
          <output>fcs/ELE_dFdu</output>
      </fcs_function>
      <!-- Rudder -->
      <fcs_function name="RUD_dFdu">
          <function>
              <value>1.2015</value>
          </function>
          <output>fcs/RUD_dFdu</output>
      </fcs_function>
      <!-- Ailerons -->
      <fcs_function name="AIL_dFdu">
          <function>
              <value>7.678</value>
          </function>
          <output>fcs/AIL_dFdu</output>
      </fcs_function>
      <!-- Flaperons -->
      <fcs_function name="FLP_dFdu">
          <function>
              <value>10.825</value>
          </function>
          <output>fcs/FLP_dFdu</output>
      </fcs_function>
    </channel>
    <channel name="misc">
      <fcs_function name="airspeed2_ms">
        <function>
          <product>
            <property>aero/qbar-psf</property>
            <value>47.880259</value>  <!--Pound Per Square Foot to N/m² (Pascal)-->
            <value>1.6327</value>     <!-- 2/rho-->
          </product>
        </function>
        <output>fcs/airspeed2_ms</output>
      </fcs_function>

      <fcs_function name="airspeed_ms">
        <function>
          <sqrt>
            <property>fcs/airspeed2_ms</property>
          </sqrt>
        </function>
        <output>fcs/airspeed_ms</output>
      </fcs_function>

      <fcs_function name="de_lag">
        <function>
          <sum>
            <!--<value>-0.8333</value>--> <!-- Convert 0 to 1 scale so that de_lag is 0 when elevator is flat -->
            <table>
              <independentVar>fcs/airspeed_ms</independentVar>
              <tableData>
              0.0   0.0
              8.8   0.0
              16.0  -0.8333
              25.0  -0.8333
              </tableData>
            </table>
            <property>fcs/ELEVATOR_lag</property>
          </sum>
        </function>
        <output>fcs/de_lag</output>
      </fcs_function>

      <fcs_function name="Ixx_body">
        <function>
          <value>0.0535</value>
        </function>
        <output>fcs/Ixx_body</output>
      </fcs_function>

      <fcs_function name="Iyy_body">
        <function>
          <value>0.9851</value>
        </function>
        <output>fcs/Iyy_body</output>
      </fcs_function>

      <fcs_function name="Ixx_wing">
        <function>
          <value>0.0621</value>
        </function>
        <output>fcs/Ixx_wing</output>
      </fcs_function>

      <fcs_function name="Iyy_wing">
        <function>
          <value>0.2788</value>
        </function>
        <output>fcs/Iyy_wing</output>
      </fcs_function>

      <fcs_function name="Ixx_quad">
          <function>
            <sum>
              <property>fcs/Ixx_body</property>
              <property>fcs/Ixx_wing</property>
            </sum>
          </function>
          <output>fcs/Ixx_quad</output>
      </fcs_function>

      <fcs_function name="Iyy_quad">
          <function>
            <sum>
              <property>fcs/Iyy_body</property>
              <property>fcs/Iyy_wing</property>
            </sum>
          </function>
          <output>fcs/Iyy_quad</output>
      </fcs_function>

      <fcs_function name="Ixx_sched">
        <function>
          <sum>
            <property>fcs/Ixx_body</property>
            <product>
              <property>fcs/Ixx_wing</property>
              <property>fcs/cos2skew</property>
            </product>
            <product>
              <property>fcs/Iyy_wing</property>
              <property>fcs/sin2skew</property>
            </product>
          </sum>
        </function>
        <output>fcs/Ixx_sched</output>
      </fcs_function>

      <fcs_function name="Iyy_sched">
        <function>
          <sum>
            <property>fcs/Iyy_body</property>
            <product>
              <property>fcs/Ixx_wing</property>
              <property>fcs/sin2skew</property>
            </product>
            <product>
              <property>fcs/Iyy_wing</property>
              <property>fcs/cos2skew</property>
            </product>
          </sum>
        </function>
        <output>fcs/Iyy_sched</output>
      </fcs_function>

      <fcs_function name="Ixx_ratio_quad_sched">
        <function>
          <quotient>
            <property>fcs/Ixx_quad</property>
            <property>fcs/Ixx_sched</property>
          </quotient>
        </function>
        <output>fcs/Ixx_ratio_quad_sched</output>
      </fcs_function>

      <fcs_function name="Iyy_ratio_quad_sched">
        <function>
          <quotient>
            <property>fcs/Iyy_quad</property>
            <property>fcs/Iyy_sched</property>
          </quotient>
        </function>
        <output>fcs/Iyy_ratio_quad_sched</output>
      </fcs_function>
    </channel>
  </flight_control>

  <external_reactions>

    <property>fcs/MOTOR_FRONT</property>
    <property>fcs/MOTOR_FRONT_lag</property>
    <property>fcs/MOTOR_FRONT_d</property>
    <property>fcs/MOTOR_RIGHT</property>
    <property>fcs/MOTOR_RIGHT_lag</property>
    <property>fcs/MOTOR_RIGHT_d</property>
    <property>fcs/MOTOR_BACK</property>
    <property>fcs/MOTOR_BACK_lag</property>
    <property>fcs/MOTOR_BACK_d</property>
    <property>fcs/MOTOR_LEFT</property>
    <property>fcs/MOTOR_LEFT_lag</property>
    <property>fcs/MOTOR_LEFT_d</property>
    <property>fcs/MOTOR_PUSHER</property>
    <property>fcs/MOTOR_PUSHER_lag</property>
    <property>fcs/ELEVATOR</property>
    <property>fcs/RUDDER</property>
    <property>fcs/AILERONS</property>
    <property>fcs/FLAPS</property>
    <property>fcs/ELEVATOR_lag</property>
    <property>fcs/RUDDER_lag</property>
    <property>fcs/AILERONS_lag</property>
    <property>fcs/FLAPS_lag</property>
    <property>fcs/ROLL</property>
    <property>fcs/PITCH</property>
    <property>fcs/YAW</property>
    <property>fcs/THRUST</property>
    <property>fcs/ROT_MECH</property>
    <property>fcs/de_lag</property>
    <property>fcs/airspeed2_ms</property>


    <!-- Split Forces and moments so that Inertia can be scheduled -->

    <!-- Forces (work in progress) -->
    <force name="MOTOR_FRONT" frame="BODY" unit="LBS">
      <function>
        <product>
          <property>fcs/mF_T</property>
          <value> 0.2248</value> <!-- N to LBS -->
        </product>
      </function>
      <location unit="M">
        <x>0</x>
        <y>0</y>
        <z>0</z>
      </location>
      <direction>
        <x>0</x>
        <y>0</y>
        <z>-1</z>
      </direction>
    </force>

    <force name="MOTOR_RIGHT" frame="BODY" unit="LBS">
      <function>
        <product>
          <property>fcs/mR_T</property>
          <value> 0.2248</value> <!-- N to LBS -->
        </product>
      </function>
      <location unit="M">
        <x>0</x>
        <y>0</y>
        <z>0</z>
      </location>
      <direction>
        <x>0</x>
        <y>0</y>
        <z>-1</z>
      </direction>
    </force>

    <force name="MOTOR_BACK" frame="BODY" unit="FT*LBS">
      <function>
        <product>
          <property>fcs/mB_T</property>
          <value> 0.2248</value> <!-- N to LBS -->
        </product>
      </function>
      <location unit="M">
        <x>0</x>
        <y>0</y>
        <z>0</z>
      </location>
      <direction>
        <x>0</x>
        <y>0</y>
        <z>-1</z>
      </direction>
    </force>

    <force name="MOTOR_LEFT" frame="BODY" unit="LBS">
      <function>
        <product>
          <property>fcs/mL_T</property>
          <value> 0.2248</value> <!-- N to LBS -->
        </product>
      </function>
      <location unit="M">
        <x>0</x>
        <y>0</y>
        <z>0</z>
      </location>
      <direction>
        <x>0</x>
        <y>0</y>
        <z>-1</z>
      </direction>
    </force>

    <force name="MOTOR_PUSHER_motor" frame="BODY" unit="LBS">
      <function>
        <product>
          <property>fcs/MOTOR_PUSHER_lag</property>
          <property>fcs/MP_dFdu</property>
          <property>fcs/pprz2jsbsim</property>
          <property>fcs/eff_scaler</property>
          <value> 0.2248</value> <!-- N to LBS -->
        </product>
      </function>
      <location unit="M">
        <x>0</x>
        <y>0</y>
        <z>0</z>
      </location>
      <direction>
        <x>1</x>
        <y>0</y>
        <z>0</z>
      </direction>
    </force>

    <!-- Control Moments-->
    <moment name="MOTOR_FRONT_PITCH" frame="BODY" unit="FT*LBS">
      <function>
        <product>
          <property>fcs/mF_T</property>
          <value> 0.440</value> <!-- Moment arm [m]-->
          <value> 0.738</value> <!-- Nm to ft-lbs -->
          <property>fcs/Iyy_ratio_quad_sched</property>
        </product>
      </function>
      <location unit="M">
        <x>0</x>
        <y>0</y>
        <z>0</z>
      </location>
      <direction>
        <x>0</x>
        <y>1</y>
        <z>0</z>
      </direction>
    </moment>

    <moment name="MOTOR_BACK_PITCH" frame="BODY" unit="FT*LBS">
      <function>
        <product>
          <property>fcs/mB_T</property>
          <value> 0.440</value> <!-- Moment arm [m]-->
          <value> 0.738</value> <!-- Nm to ft-lbs -->
          <property>fcs/Iyy_ratio_quad_sched</property>
        </product>
      </function>
      <location unit="M">
        <x>0</x>
        <y>0</y>
        <z>0</z>
      </location>
      <direction>
        <x>0</x>
        <y>-1</y>
        <z>0</z>
      </direction>
    </moment>

    <moment name="MOTOR_RIGHT_ROLL" frame="BODY" unit="FT*LBS">
      <function>
        <product>
          <property>fcs/mR_T</property>
          <property>fcs/cosskew</property>
          <value> 0.380</value> <!-- Moment arm [m]-->
          <value> 0.738</value> <!-- Nm to ft-lbs -->
          <property>fcs/Ixx_ratio_quad_sched</property>
        </product>
      </function>
      <location unit="M">
        <x>0</x>
        <y>0</y>
        <z>0</z>
      </location>
      <direction>
        <x>-1</x>
        <y>0</y>
        <z>0</z>
      </direction>
    </moment>

    <moment name="MOTOR_RIGHT_PITCH" frame="BODY" unit="FT*LBS">
      <function>
        <product>
          <property>fcs/mR_T</property>
          <property>fcs/sinskew</property>
          <value> 0.380</value> <!-- Moment arm [m]-->
          <value> 0.738</value> <!-- Nm to ft-lbs -->
          <property>fcs/Iyy_ratio_quad_sched</property>
        </product>
      </function>
      <location unit="M">
        <x>0</x>
        <y>0</y>
        <z>0</z>
      </location>
      <direction>
        <x>0</x>
        <y>1</y>
        <z>0</z>
      </direction>
    </moment>

    <moment name="MOTOR_LEFT_ROLL" frame="BODY" unit="FT*LBS">
      <function>
        <product>
          <property>fcs/mL_T</property>
          <property>fcs/cosskew</property>
          <value> 0.380</value> <!-- Moment arm [m]-->
          <value> 0.738</value> <!-- Nm to ft-lbs -->
          <property>fcs/Ixx_ratio_quad_sched</property>
        </product>
      </function>
      <location unit="M">
        <x>0</x>
        <y>0</y>
        <z>0</z>
      </location>
      <direction>
        <x>1</x>
        <y>0</y>
        <z>0</z>
      </direction>
    </moment>

    <moment name="MOTOR_LEFT_PITCH" frame="BODY" unit="FT*LBS">
      <function>
        <product>
          <property>fcs/mL_T</property>
          <property>fcs/sinskew</property>
          <value> 0.380</value> <!-- Moment arm [m]-->
          <value> 0.738</value> <!-- Nm to ft-lbs -->
          <property>fcs/Iyy_ratio_quad_sched</property>
        </product>
      </function>
      <location unit="M">
        <x>0</x>
        <y>0</y>
        <z>0</z>
      </location>
      <direction>
        <x>0</x>
        <y>-1</y>
        <z>0</z>
      </direction>
    </moment>

    <moment name="ELEVATOR_PITCH" frame="BODY" unit="FT*LBS">
      <function>
        <product>
          <table>
            <independentVar>fcs/airspeed2_ms</independentVar>
            <tableData>
              0.0   0.0
              77.44 0.0
              256   1.0
            </tableData>
          </table>
          <property>fcs/airspeed2_ms</property>
          <property>fcs/de_lag</property>
          <property>fcs/ELE_dFdu</property>
          <property>fcs/pprz2jsbsim</property>
          <property>fcs/eff_scaler</property>
          <property>fcs/eff_scaler</property>
          <value>0.850</value> <!-- Moment arm [m]-->
          <value> 0.738</value> <!-- Nm to ft-lbs -->
          <property>fcs/Iyy_ratio_quad_sched</property>
        </product>
      </function>
      <location unit="M">
        <x>0</x>
        <y>0</y>
        <z>0</z>
      </location>
      <direction>
        <x>0</x>
        <y>1</y>
        <z>0</z>
      </direction>
    </moment>

    <moment name="RUDDER_YAW" frame="BODY" unit="FT*LBS">
      <function>
        <product>
          <property>fcs/airspeed2_ms</property>
          <property>fcs/RUDDER_lag</property>
          <property>fcs/RUD_dFdu</property>
          <property>fcs/pprz2jsbsim</property>
          <property>fcs/eff_scaler</property>
          <property>fcs/eff_scaler</property>
          <value>0.880</value> <!-- Moment arm [m]-->
          <value> 0.738</value> <!-- Nm to ft-lbs -->
        </product>
      </function>
      <location unit="M">
        <x>0</x>
        <y>0</y>
        <z>0</z>
      </location>
      <direction>
        <x>0</x>
        <y>0</y>
        <z>1</z>
      </direction>
    </moment>

    <moment name="AILERONS_ROLL" frame="BODY" unit="FT*LBS">
      <function>
        <product>
          <property>fcs/AILERONS_lag</property>
          <property>fcs/sin3skew</property>
          <property>fcs/airspeed2_ms</property>
          <property>fcs/AIL_dFdu</property>
          <property>fcs/pprz2jsbsim</property>
          <property>fcs/eff_scaler</property>
          <property>fcs/eff_scaler</property>
          <value>0.68</value> <!-- Moment arm [m]-->
          <value> 0.738</value> <!-- Nm to ft-lbs -->
          <property>fcs/Ixx_ratio_quad_sched</property>
        </product>
      </function>
      <location unit="M">
        <x>0</x>
        <y>0</y>
        <z>0</z>
      </location>
      <direction>
        <x>1</x>
        <y>0</y>
        <z>0</z>
      </direction>
    </moment>

    <moment name="FLAPS_ROLL" frame="BODY" unit="FT*LBS">
      <function>
        <product>
          <property>fcs/airspeed2_ms</property>
          <property>fcs/FLAPS_lag</property>
          <property>fcs/sin3skew</property>
          <property>fcs/FLP_dFdu</property>
          <property>fcs/pprz2jsbsim</property>
          <property>fcs/eff_scaler</property>
          <property>fcs/eff_scaler</property>
          <value>0.355</value> <!-- Moment arm [m]-->
          <value> 0.738</value> <!-- Nm to ft-lbs -->
          <property>fcs/Ixx_ratio_quad_sched</property>
        </product>
      </function>
      <location unit="M">
        <x>0</x>
        <y>0</y>
        <z>0</z>
      </location>
      <direction>
        <x>1</x>
        <y>0</y>
        <z>0</z>
      </direction>
    </moment>

    <moment name="AILERONS_PITCH" frame="BODY" unit="FT*LBS">
      <function>
        <product>
          <property>fcs/airspeed2_ms</property>
          <property>fcs/AILERONS_lag</property>
          <property>fcs/coscos3skew</property>
          <property>fcs/AIL_dFdu</property>
          <property>fcs/pprz2jsbsim</property>
          <property>fcs/eff_scaler</property>
          <property>fcs/eff_scaler</property>
          <value>0.68</value> <!-- Moment arm [m]-->
          <value> 0.738</value> <!-- Nm to ft-lbs -->
          <property>fcs/Iyy_ratio_quad_sched</property>
        </product>
      </function>
      <location unit="M">
        <x>0</x>
        <y>0</y>
        <z>0</z>
      </location>
      <direction>
        <x>0</x>
        <y>1</y>
        <z>0</z>
      </direction>
    </moment>

    <moment name="FLAPS_PITCH" frame="BODY" unit="FT*LBS">
      <function>
        <product>
         <property>fcs/airspeed2_ms</property>
         <property>fcs/FLAPS_lag</property>
         <property>fcs/coscos3skew</property>
          <property>fcs/FLP_dFdu</property>
          <property>fcs/pprz2jsbsim</property>
          <property>fcs/eff_scaler</property>
          <property>fcs/eff_scaler</property>
         <value>0.355</value> <!-- Moment arm [m]-->
         <value> 0.738</value> <!-- Nm to ft-lbs -->
         <property>fcs/Iyy_ratio_quad_sched</property>
        </product>
      </function>
      <location unit="M">
        <x>0</x>
        <y>0</y>
        <z>0</z>
      </location>
      <direction>
        <x>0</x>
        <y>1</y>
        <z>0</z>
      </direction>
    </moment>

    <!-- Reaction Torques -->
    <moment name="MOTOR_FRONT_reaction_torque" frame="BODY" unit="FT*LBS">
      <function>
        <product>
          <property>fcs/MOTOR_FRONT_lag</property>
          <property>fcs/MQ_dMdu</property>
          <property>fcs/pprz2jsbsim</property>
          <property>fcs/eff_scaler</property>
          <value> 0.738</value> <!-- Nm to ft-lbs -->
        </product>
      </function>
      <location unit="M">
        <x>-0.440</x>
        <y>0</y>
        <z>0</z>
      </location>
      <direction>
        <x>0</x>
        <y>0</y>
        <z>-1</z>
      </direction>
    </moment>

    <moment name="MOTOR_RIGHT_reaction_torque" frame="BODY" unit="FT*LBS">
      <function>
        <product>
          <property>fcs/MOTOR_RIGHT_lag</property>
          <property>fcs/MQ_dMdu</property>
          <property>fcs/pprz2jsbsim</property>
          <property>fcs/eff_scaler</property>
          <value> 0.738</value> <!-- Nm to ft-lbs -->
        </product>
      </function>
      <location unit="M">
        <x>0</x>
        <y>0.380</y>
        <z>0</z>
      </location>
      <direction>
        <x>0</x>
        <y>0</y>
        <z>1</z>
      </direction>
    </moment>

    <moment name="MOTOR_BACK_reaction_torque" frame="BODY" unit="FT*LBS">
      <function>
        <product>
          <property>fcs/MOTOR_FRONT_lag</property>
          <property>fcs/MQ_dMdu</property>
          <property>fcs/pprz2jsbsim</property>
          <property>fcs/eff_scaler</property>
          <value> 0.738</value> <!-- Nm to ft-lbs -->
        </product>
      </function>
      <location unit="M">
        <x>0.440</x>
        <y>0</y>
        <z>0</z>
      </location>
      <direction>
        <x>0</x>
        <y>0</y>
        <z>-1</z>
      </direction>
    </moment>

    <moment name="MOTOR_LEFT_reaction_torque" frame="BODY" unit="FT*LBS">
      <function>
        <product>
          <property>fcs/MOTOR_LEFT_lag</property>
          <property>fcs/MQ_dMdu</property>
          <property>fcs/pprz2jsbsim</property>
          <property>fcs/eff_scaler</property>
          <value> 0.738</value> <!-- Nm to ft-lbs -->
        </product>
      </function>
      <location unit="M">
        <x>0</x>
        <y>-0.380</y>
        <z>0</z>
      </location>
      <direction>
        <x>0</x>
        <y>0</y>
        <z>1</z>
      </direction>
    </moment>

    <!-- Now the G2 moment couples -->
    <moment name="MOTOR_FRONT_reaction_torque_G2" frame="BODY" unit="FT*LBS">
      <function>
        <product>
          <property>fcs/MOTOR_FRONT_d</property>
          <property>fcs/MQ_dMdud</property>
          <property>fcs/pprz2jsbsim</property>
          <property>fcs/eff_scaler</property>
          <value> 0.738</value> <!-- Nm to ft-lbs -->
        </product>
      </function>
      <location unit="M">
        <x>-0.440</x>
        <y>0</y>
        <z>0</z>
      </location>
      <direction>
        <x>0</x>
        <y>0</y>
        <z>-1</z>
      </direction>
    </moment>

    <moment name="MOTOR_RIGHT_reaction_torque_G2" frame="BODY" unit="FT*LBS">
      <function>
        <product>
          <property>fcs/MOTOR_RIGHT_lag</property>
          <property>fcs/MQ_dMdud</property>
          <property>fcs/pprz2jsbsim</property>
          <property>fcs/eff_scaler</property>
          <value> 0.738</value> <!-- Nm to ft-lbs -->
        </product>
      </function>
      <location unit="M">
        <x>0</x>
        <y>0.380</y>
        <z>0</z>
      </location>
      <direction>
        <x>0</x>
        <y>0</y>
        <z>1</z>
      </direction>
    </moment>

    <moment name="MOTOR_BACK_reaction_torque_G2" frame="BODY" unit="FT*LBS">
      <function>
        <product>
          <property>fcs/MOTOR_FRONT_lag</property>
          <property>fcs/MQ_dMdud</property>
          <property>fcs/pprz2jsbsim</property>
          <property>fcs/eff_scaler</property>
          <value> 0.738</value> <!-- Nm to ft-lbs -->
        </product>
      </function>
      <location unit="M">
        <x>0.440</x>
        <y>0</y>
        <z>0</z>
      </location>
      <direction>
        <x>0</x>
        <y>0</y>
        <z>-1</z>
      </direction>
    </moment>

    <moment name="MOTOR_LEFT_reaction_torque_G2" frame="BODY" unit="FT*LBS">
      <function>
        <product>
          <property>fcs/MOTOR_RIGHT_lag</property>
          <property>fcs/MQ_dMdud</property>
          <property>fcs/pprz2jsbsim</property>
          <property>fcs/eff_scaler</property>
          <value> 0.738</value> <!-- Nm to ft-lbs -->
        </product>
      </function>
      <location unit="M">
        <x>0</x>
        <y>-0.380</y>
        <z>0</z>
      </location>
      <direction>
        <x>0</x>
        <y>0</y>
        <z>1</z>
      </direction>
    </moment>
  </external_reactions>

  <propulsion/>

  <flight_control name="FGFCS"/>

  <aerodynamics>
    <axis name="DRAG">
      <function name="aero/coefficient/CD">
        <description>Drag</description>
        <product>
          <property>fcs/airspeed2_ms</property>
          <value>0.0576</value> <!-- CD x Area (m^2) -->
          <value>0.224808943</value> <!-- N to LBS -->
        </product>
      </function>
    </axis>


   <axis name="LIFT">
    <function name="aero/force/Lift_alpha">
     <product>
      <sum>
        <product>
          <value> 0.4887 </value>
          <property>aero/alpha-rad</property>
          <property>fcs/airspeed2_ms</property>
        </product>
        <product>
          <value> 0.616 </value>
          <property>fcs/sin2skew</property>
          <property>aero/alpha-rad</property>
          <property>fcs/airspeed2_ms</property>
        </product>
        <product>
          <value> 0.120 </value>
          <property>fcs/sin2skew</property>
          <property>fcs/airspeed2_ms</property>
        </product>
      </sum>
      <value> 0.2248</value> <!-- N to LBS -->
      </product>
    </function>
   </axis>
  <axis name="YAW">
   <function name="aero/moment/Yaw_beta" frame="BODY" unit="FT*LBS">
      <product>
        <value> 1.0 </value>
        <value> 0.5 </value>
        <value> 1.225 </value> <!-- rho kg/m^3 -->
        <property>fcs/airspeed2_ms</property>
        <value>0.039</value> <!--Aerea vertical tail-->
        <value>6.28</value>  <!-- Flat plate CL = 2PI-->
        <property>aero/beta-rad</property>
        <value> 1.0 </value> <!-- Moment arm [m]-->
         <value>0.7376</value> <!--Convert to lbsft-->
      </product>
    </function>
    <function name="aero/moment/Yaw_damp">
       <description>Yaw moment due to yaw rate as estimated in Inertia test</description>
       <product>
           <property>velocities/r-aero-rad_sec</property>
           <value>-0.1069</value>
       </product>
    </function>
  </axis>
  </aerodynamics>

</fdm_config>
